// SBML level 3 version 1

model main()
  // model units - substance: mole, time: second, extent: mole

  // Compartments:
  compartment c1 = 1 litre;

  // Species:
  species Crosslinker in c1 = 0.0002452748/c1;
  species CrosslinkerMonoHydrolized in c1 = 0;
  species CrosslinkerBiHydrolized in c1 = 0;
  species LYS_P52732_A_15 in c1 = 2.335951e-5/c1;
  species LYS_P52732_A_17 in c1 = 2.335951e-5/c1;
  species LYS_P52732_A_34 in c1 = 2.335951e-5/c1;
  species LYS_P52732_A_48 in c1 = 2.335951e-5/c1;
  species LYS_P52732_A_60 in c1 = 2.335951e-5/c1;
  species LYS_P52732_A_64 in c1 = 2.335951e-5/c1;
  species LYS_P52732_A_77 in c1 = 2.335951e-5/c1;
  species LYS_P52732_A_146 in c1 = 2.335951e-5/c1;
  species LYS_P52732_A_157 in c1 = 2.335951e-5/c1;
  species LYS_P52732_A_191 in c1 = 2.335951e-5/c1;
  species LYS_P52732_A_197 in c1 = 2.335951e-5/c1;
  species LYS_P52732_A_207 in c1 = 2.335951e-5/c1;
  species LYS_P52732_A_216 in c1 = 2.335951e-5/c1;
  species LYS_P52732_A_220 in c1 = 2.335951e-5/c1;
  species LYS_P52732_A_246 in c1 = 2.335951e-5/c1;
  species LYS_P52732_A_257 in c1 = 2.335951e-5/c1;
  species LYS_P52732_A_260 in c1 = 2.335951e-5/c1;
  species LYS_P52732_A_315 in c1 = 2.335951e-5/c1;
  species LYS_P52732_A_357 in c1 = 2.335951e-5/c1;
  species LYS_P52732_A_362 in c1 = 2.335951e-5/c1;
  species LYS_P52732_A_368 in c1 = 2.335951e-5/c1;
  species Mono_P52732_A_15 in c1 = 0;
  species Mono_P52732_A_17 in c1 = 0;
  species Mono_P52732_A_34 in c1 = 0;
  species Mono_P52732_A_48 in c1 = 0;
  species Mono_P52732_A_60 in c1 = 0;
  species Mono_P52732_A_64 in c1 = 0;
  species Mono_P52732_A_77 in c1 = 0;
  species Mono_P52732_A_146 in c1 = 0;
  species Mono_P52732_A_157 in c1 = 0;
  species Mono_P52732_A_191 in c1 = 0;
  species Mono_P52732_A_197 in c1 = 0;
  species Mono_P52732_A_207 in c1 = 0;
  species Mono_P52732_A_216 in c1 = 0;
  species Mono_P52732_A_220 in c1 = 0;
  species Mono_P52732_A_246 in c1 = 0;
  species Mono_P52732_A_257 in c1 = 0;
  species Mono_P52732_A_260 in c1 = 0;
  species Mono_P52732_A_315 in c1 = 0;
  species Mono_P52732_A_357 in c1 = 0;
  species Mono_P52732_A_362 in c1 = 0;
  species Mono_P52732_A_368 in c1 = 0;
  species MonoHydro_P52732_A_15 in c1 = 0;
  species MonoHydro_P52732_A_17 in c1 = 0;
  species MonoHydro_P52732_A_34 in c1 = 0;
  species MonoHydro_P52732_A_48 in c1 = 0;
  species MonoHydro_P52732_A_60 in c1 = 0;
  species MonoHydro_P52732_A_64 in c1 = 0;
  species MonoHydro_P52732_A_77 in c1 = 0;
  species MonoHydro_P52732_A_146 in c1 = 0;
  species MonoHydro_P52732_A_157 in c1 = 0;
  species MonoHydro_P52732_A_191 in c1 = 0;
  species MonoHydro_P52732_A_197 in c1 = 0;
  species MonoHydro_P52732_A_207 in c1 = 0;
  species MonoHydro_P52732_A_216 in c1 = 0;
  species MonoHydro_P52732_A_220 in c1 = 0;
  species MonoHydro_P52732_A_246 in c1 = 0;
  species MonoHydro_P52732_A_257 in c1 = 0;
  species MonoHydro_P52732_A_260 in c1 = 0;
  species MonoHydro_P52732_A_315 in c1 = 0;
  species MonoHydro_P52732_A_357 in c1 = 0;
  species MonoHydro_P52732_A_362 in c1 = 0;
  species MonoHydro_P52732_A_368 in c1 = 0;
  species XL_P52732_A_15_P52732_A_17 in c1 = 0;
  species XL_P52732_A_15_P52732_A_48 in c1 = 0;
  species XL_P52732_A_15_P52732_A_191 in c1 = 0;
  species XL_P52732_A_15_P52732_A_257 in c1 = 0;
  species XL_P52732_A_15_P52732_A_357 in c1 = 0;
  species XL_P52732_A_15_P52732_A_362 in c1 = 0;
  species XL_P52732_A_15_P52732_A_368 in c1 = 0;
  species XL_P52732_A_17_P52732_A_48 in c1 = 0;
  species XL_P52732_A_17_P52732_A_146 in c1 = 0;
  species XL_P52732_A_17_P52732_A_257 in c1 = 0;
  species XL_P52732_A_17_P52732_A_357 in c1 = 0;
  species XL_P52732_A_17_P52732_A_362 in c1 = 0;
  species XL_P52732_A_17_P52732_A_368 in c1 = 0;
  species XL_P52732_A_34_P52732_A_77 in c1 = 0;
  species XL_P52732_A_48_P52732_A_64 in c1 = 0;
  species XL_P52732_A_48_P52732_A_77 in c1 = 0;
  species XL_P52732_A_48_P52732_A_357 in c1 = 0;
  species XL_P52732_A_48_P52732_A_362 in c1 = 0;
  species XL_P52732_A_60_P52732_A_64 in c1 = 0;
  species XL_P52732_A_64_P52732_A_357 in c1 = 0;
  species XL_P52732_A_77_P52732_A_207 in c1 = 0;
  species XL_P52732_A_146_P52732_A_207 in c1 = 0;
  species XL_P52732_A_146_P52732_A_246 in c1 = 0;
  species XL_P52732_A_146_P52732_A_257 in c1 = 0;
  species XL_P52732_A_157_P52732_A_191 in c1 = 0;
  species XL_P52732_A_157_P52732_A_197 in c1 = 0;
  species XL_P52732_A_157_P52732_A_207 in c1 = 0;
  species XL_P52732_A_157_P52732_A_216 in c1 = 0;
  species XL_P52732_A_157_P52732_A_220 in c1 = 0;
  species XL_P52732_A_157_P52732_A_246 in c1 = 0;
  species XL_P52732_A_157_P52732_A_260 in c1 = 0;
  species XL_P52732_A_157_P52732_A_368 in c1 = 0;
  species XL_P52732_A_191_P52732_A_197 in c1 = 0;
  species XL_P52732_A_191_P52732_A_260 in c1 = 0;
  species XL_P52732_A_191_P52732_A_315 in c1 = 0;
  species XL_P52732_A_191_P52732_A_362 in c1 = 0;
  species XL_P52732_A_191_P52732_A_368 in c1 = 0;
  species XL_P52732_A_197_P52732_A_220 in c1 = 0;
  species XL_P52732_A_197_P52732_A_246 in c1 = 0;
  species XL_P52732_A_197_P52732_A_260 in c1 = 0;
  species XL_P52732_A_197_P52732_A_315 in c1 = 0;
  species XL_P52732_A_197_P52732_A_368 in c1 = 0;
  species XL_P52732_A_207_P52732_A_216 in c1 = 0;
  species XL_P52732_A_207_P52732_A_246 in c1 = 0;
  species XL_P52732_A_216_P52732_A_220 in c1 = 0;
  species XL_P52732_A_246_P52732_A_257 in c1 = 0;
  species XL_P52732_A_246_P52732_A_260 in c1 = 0;
  species XL_P52732_A_246_P52732_A_362 in c1 = 0;
  species XL_P52732_A_246_P52732_A_368 in c1 = 0;
  species XL_P52732_A_257_P52732_A_362 in c1 = 0;
  species XL_P52732_A_257_P52732_A_368 in c1 = 0;
  species XL_P52732_A_260_P52732_A_362 in c1 = 0;
  species XL_P52732_A_260_P52732_A_368 in c1 = 0;
  species XL_P52732_A_357_P52732_A_362 in c1 = 0;
  species XL_P52732_A_362_P52732_A_368 in c1 = 0;

  // Parameters:
  kh = 2.5e-5 per_second;
  kon = 10000000 litre_per_mole_per_second;
  koff = 1000000000 per_second;
  MolecularWeight = 42809.1193 per_second;
  NumLys = 21 per_second;
  pH = 7 per_second;
  klys_P52732_A_15 = 0.6955095 per_second;
  klys_P52732_A_17 = 0.426907 per_second;
  klys_P52732_A_34 = 0.5824595 per_second;
  klys_P52732_A_48 = 0.2117506 per_second;
  klys_P52732_A_60 = 0.705701 per_second;
  klys_P52732_A_64 = 0.1945326 per_second;
  klys_P52732_A_77 = 0.448596 per_second;
  klys_P52732_A_146 = 0.09301482 per_second;
  klys_P52732_A_157 = 0.2362781 per_second;
  klys_P52732_A_191 = 0.6429388 per_second;
  klys_P52732_A_197 = 0.4590491 per_second;
  klys_P52732_A_207 = 0.152232 per_second;
  klys_P52732_A_216 = 0.4449919 per_second;
  klys_P52732_A_220 = 0.01749909 per_second;
  klys_P52732_A_246 = 0.2530779 per_second;
  klys_P52732_A_257 = 0.03895754 per_second;
  klys_P52732_A_260 = 0.1752431 per_second;
  klys_P52732_A_315 = 0.2050016 per_second;
  klys_P52732_A_357 = 0.1406463 per_second;
  klys_P52732_A_362 = 0.5348097 per_second;
  klys_P52732_A_368 = 0.513017 per_second;
  kon_xl_P52732_A_15_P52732_A_17 = 2.970206e8 litre_per_mole_per_second;
  kon_xl_P52732_A_15_P52732_A_48 = 3.216796e7 litre_per_mole_per_second;
  kon_xl_P52732_A_15_P52732_A_191 = 1.331533e8 litre_per_mole_per_second;
  kon_xl_P52732_A_15_P52732_A_257 = 3.937838e7 litre_per_mole_per_second;
  kon_xl_P52732_A_15_P52732_A_357 = 6.138434e8 litre_per_mole_per_second;
  kon_xl_P52732_A_15_P52732_A_362 = 5.489993e7 litre_per_mole_per_second;
  kon_xl_P52732_A_15_P52732_A_368 = 6.99914e7 litre_per_mole_per_second;
  kon_xl_P52732_A_17_P52732_A_48 = 6.399024e8 litre_per_mole_per_second;
  kon_xl_P52732_A_17_P52732_A_146 = 3783167 litre_per_mole_per_second;
  kon_xl_P52732_A_17_P52732_A_257 = 2.004674e7 litre_per_mole_per_second;
  kon_xl_P52732_A_17_P52732_A_357 = 6.084953e8 litre_per_mole_per_second;
  kon_xl_P52732_A_17_P52732_A_362 = 3.995249e8 litre_per_mole_per_second;
  kon_xl_P52732_A_17_P52732_A_368 = 1.497103e7 litre_per_mole_per_second;
  kon_xl_P52732_A_34_P52732_A_77 = 1615535 litre_per_mole_per_second;
  kon_xl_P52732_A_48_P52732_A_64 = 4.255006e7 litre_per_mole_per_second;
  kon_xl_P52732_A_48_P52732_A_77 = 1.462505e8 litre_per_mole_per_second;
  kon_xl_P52732_A_48_P52732_A_357 = 8.81212e8 litre_per_mole_per_second;
  kon_xl_P52732_A_48_P52732_A_362 = 1000000 litre_per_mole_per_second;
  kon_xl_P52732_A_60_P52732_A_64 = 9.618388e8 litre_per_mole_per_second;
  kon_xl_P52732_A_64_P52732_A_357 = 4.588887e8 litre_per_mole_per_second;
  kon_xl_P52732_A_77_P52732_A_207 = 1.89495e7 litre_per_mole_per_second;
  kon_xl_P52732_A_146_P52732_A_207 = 1.659089e8 litre_per_mole_per_second;
  kon_xl_P52732_A_146_P52732_A_246 = 5.902573e8 litre_per_mole_per_second;
  kon_xl_P52732_A_146_P52732_A_257 = 9.43957e8 litre_per_mole_per_second;
  kon_xl_P52732_A_157_P52732_A_191 = 3659608 litre_per_mole_per_second;
  kon_xl_P52732_A_157_P52732_A_197 = 9.391497e8 litre_per_mole_per_second;
  kon_xl_P52732_A_157_P52732_A_207 = 9348797 litre_per_mole_per_second;
  kon_xl_P52732_A_157_P52732_A_216 = 4.613816e7 litre_per_mole_per_second;
  kon_xl_P52732_A_157_P52732_A_220 = 5071740 litre_per_mole_per_second;
  kon_xl_P52732_A_157_P52732_A_246 = 9.544065e8 litre_per_mole_per_second;
  kon_xl_P52732_A_157_P52732_A_260 = 4.673473e8 litre_per_mole_per_second;
  kon_xl_P52732_A_157_P52732_A_368 = 2.333318e8 litre_per_mole_per_second;
  kon_xl_P52732_A_191_P52732_A_197 = 1.81442e8 litre_per_mole_per_second;
  kon_xl_P52732_A_191_P52732_A_260 = 5.23563e8 litre_per_mole_per_second;
  kon_xl_P52732_A_191_P52732_A_315 = 7.880148e7 litre_per_mole_per_second;
  kon_xl_P52732_A_191_P52732_A_362 = 8.070457e8 litre_per_mole_per_second;
  kon_xl_P52732_A_191_P52732_A_368 = 3.537835e8 litre_per_mole_per_second;
  kon_xl_P52732_A_197_P52732_A_220 = 7.493996e7 litre_per_mole_per_second;
  kon_xl_P52732_A_197_P52732_A_246 = 1198142 litre_per_mole_per_second;
  kon_xl_P52732_A_197_P52732_A_260 = 8.96328e8 litre_per_mole_per_second;
  kon_xl_P52732_A_197_P52732_A_315 = 1.212889e7 litre_per_mole_per_second;
  kon_xl_P52732_A_197_P52732_A_368 = 7174582 litre_per_mole_per_second;
  kon_xl_P52732_A_207_P52732_A_216 = 2.72104e7 litre_per_mole_per_second;
  kon_xl_P52732_A_207_P52732_A_246 = 6082602 litre_per_mole_per_second;
  kon_xl_P52732_A_216_P52732_A_220 = 3.818361e8 litre_per_mole_per_second;
  kon_xl_P52732_A_246_P52732_A_257 = 1.446672e8 litre_per_mole_per_second;
  kon_xl_P52732_A_246_P52732_A_260 = 3.246504e7 litre_per_mole_per_second;
  kon_xl_P52732_A_246_P52732_A_362 = 1682251 litre_per_mole_per_second;
  kon_xl_P52732_A_246_P52732_A_368 = 1000000000 litre_per_mole_per_second;
  kon_xl_P52732_A_257_P52732_A_362 = 7.070798e7 litre_per_mole_per_second;
  kon_xl_P52732_A_257_P52732_A_368 = 2.954625e8 litre_per_mole_per_second;
  kon_xl_P52732_A_260_P52732_A_362 = 1.133697e7 litre_per_mole_per_second;
  kon_xl_P52732_A_260_P52732_A_368 = 7.642356e8 litre_per_mole_per_second;
  kon_xl_P52732_A_357_P52732_A_362 = 4.685446e7 litre_per_mole_per_second;
  kon_xl_P52732_A_362_P52732_A_368 = 2.061772e8 litre_per_mole_per_second;
  k_zero = 0 per_second;

  // Reactions:
  v1: Crosslinker => CrosslinkerMonoHydrolized; kh*Crosslinker;
  v2: CrosslinkerMonoHydrolized => CrosslinkerBiHydrolized; kh*CrosslinkerMonoHydrolized;
  v3: LYS_P52732_A_15 + Crosslinker => Mono_P52732_A_15; klys_P52732_A_15*Crosslinker*LYS_P52732_A_15;
  v4: LYS_P52732_A_17 + Crosslinker => Mono_P52732_A_17; klys_P52732_A_17*Crosslinker*LYS_P52732_A_17;
  v5: LYS_P52732_A_34 + Crosslinker => Mono_P52732_A_34; klys_P52732_A_34*Crosslinker*LYS_P52732_A_34;
  v6: LYS_P52732_A_48 + Crosslinker => Mono_P52732_A_48; klys_P52732_A_48*Crosslinker*LYS_P52732_A_48;
  v7: LYS_P52732_A_60 + Crosslinker => Mono_P52732_A_60; klys_P52732_A_60*Crosslinker*LYS_P52732_A_60;
  v8: LYS_P52732_A_64 + Crosslinker => Mono_P52732_A_64; klys_P52732_A_64*Crosslinker*LYS_P52732_A_64;
  v9: LYS_P52732_A_77 + Crosslinker => Mono_P52732_A_77; klys_P52732_A_77*Crosslinker*LYS_P52732_A_77;
  v10: LYS_P52732_A_146 + Crosslinker => Mono_P52732_A_146; klys_P52732_A_146*Crosslinker*LYS_P52732_A_146;
  v11: LYS_P52732_A_157 + Crosslinker => Mono_P52732_A_157; klys_P52732_A_157*Crosslinker*LYS_P52732_A_157;
  v12: LYS_P52732_A_191 + Crosslinker => Mono_P52732_A_191; klys_P52732_A_191*Crosslinker*LYS_P52732_A_191;
  v13: LYS_P52732_A_197 + Crosslinker => Mono_P52732_A_197; klys_P52732_A_197*Crosslinker*LYS_P52732_A_197;
  v14: LYS_P52732_A_207 + Crosslinker => Mono_P52732_A_207; klys_P52732_A_207*Crosslinker*LYS_P52732_A_207;
  v15: LYS_P52732_A_216 + Crosslinker => Mono_P52732_A_216; klys_P52732_A_216*Crosslinker*LYS_P52732_A_216;
  v16: LYS_P52732_A_220 + Crosslinker => Mono_P52732_A_220; klys_P52732_A_220*Crosslinker*LYS_P52732_A_220;
  v17: LYS_P52732_A_246 + Crosslinker => Mono_P52732_A_246; klys_P52732_A_246*Crosslinker*LYS_P52732_A_246;
  v18: LYS_P52732_A_257 + Crosslinker => Mono_P52732_A_257; klys_P52732_A_257*Crosslinker*LYS_P52732_A_257;
  v19: LYS_P52732_A_260 + Crosslinker => Mono_P52732_A_260; klys_P52732_A_260*Crosslinker*LYS_P52732_A_260;
  v20: LYS_P52732_A_315 + Crosslinker => Mono_P52732_A_315; klys_P52732_A_315*Crosslinker*LYS_P52732_A_315;
  v21: LYS_P52732_A_357 + Crosslinker => Mono_P52732_A_357; klys_P52732_A_357*Crosslinker*LYS_P52732_A_357;
  v22: LYS_P52732_A_362 + Crosslinker => Mono_P52732_A_362; klys_P52732_A_362*Crosslinker*LYS_P52732_A_362;
  v23: LYS_P52732_A_368 + Crosslinker => Mono_P52732_A_368; klys_P52732_A_368*Crosslinker*LYS_P52732_A_368;
  v24: Mono_P52732_A_15 => MonoHydro_P52732_A_15; kh*Mono_P52732_A_15;
  v25: Mono_P52732_A_17 => MonoHydro_P52732_A_17; kh*Mono_P52732_A_17;
  v26: Mono_P52732_A_34 => MonoHydro_P52732_A_34; kh*Mono_P52732_A_34;
  v27: Mono_P52732_A_48 => MonoHydro_P52732_A_48; kh*Mono_P52732_A_48;
  v28: Mono_P52732_A_60 => MonoHydro_P52732_A_60; kh*Mono_P52732_A_60;
  v29: Mono_P52732_A_64 => MonoHydro_P52732_A_64; kh*Mono_P52732_A_64;
  v30: Mono_P52732_A_77 => MonoHydro_P52732_A_77; kh*Mono_P52732_A_77;
  v31: Mono_P52732_A_146 => MonoHydro_P52732_A_146; kh*Mono_P52732_A_146;
  v32: Mono_P52732_A_157 => MonoHydro_P52732_A_157; kh*Mono_P52732_A_157;
  v33: Mono_P52732_A_191 => MonoHydro_P52732_A_191; kh*Mono_P52732_A_191;
  v34: Mono_P52732_A_197 => MonoHydro_P52732_A_197; kh*Mono_P52732_A_197;
  v35: Mono_P52732_A_207 => MonoHydro_P52732_A_207; kh*Mono_P52732_A_207;
  v36: Mono_P52732_A_216 => MonoHydro_P52732_A_216; kh*Mono_P52732_A_216;
  v37: Mono_P52732_A_220 => MonoHydro_P52732_A_220; kh*Mono_P52732_A_220;
  v38: Mono_P52732_A_246 => MonoHydro_P52732_A_246; kh*Mono_P52732_A_246;
  v39: Mono_P52732_A_257 => MonoHydro_P52732_A_257; kh*Mono_P52732_A_257;
  v40: Mono_P52732_A_260 => MonoHydro_P52732_A_260; kh*Mono_P52732_A_260;
  v41: Mono_P52732_A_315 => MonoHydro_P52732_A_315; kh*Mono_P52732_A_315;
  v42: Mono_P52732_A_357 => MonoHydro_P52732_A_357; kh*Mono_P52732_A_357;
  v43: Mono_P52732_A_362 => MonoHydro_P52732_A_362; kh*Mono_P52732_A_362;
  v44: Mono_P52732_A_368 => MonoHydro_P52732_A_368; kh*Mono_P52732_A_368;
  v45: LYS_P52732_A_15 + CrosslinkerMonoHydrolized => MonoHydro_P52732_A_15; klys_P52732_A_15*CrosslinkerMonoHydrolized*LYS_P52732_A_15;
  v46: LYS_P52732_A_17 + CrosslinkerMonoHydrolized => MonoHydro_P52732_A_17; klys_P52732_A_17*CrosslinkerMonoHydrolized*LYS_P52732_A_17;
  v47: LYS_P52732_A_34 + CrosslinkerMonoHydrolized => MonoHydro_P52732_A_34; klys_P52732_A_34*CrosslinkerMonoHydrolized*LYS_P52732_A_34;
  v48: LYS_P52732_A_48 + CrosslinkerMonoHydrolized => MonoHydro_P52732_A_48; klys_P52732_A_48*CrosslinkerMonoHydrolized*LYS_P52732_A_48;
  v49: LYS_P52732_A_60 + CrosslinkerMonoHydrolized => MonoHydro_P52732_A_60; klys_P52732_A_60*CrosslinkerMonoHydrolized*LYS_P52732_A_60;
  v50: LYS_P52732_A_64 + CrosslinkerMonoHydrolized => MonoHydro_P52732_A_64; klys_P52732_A_64*CrosslinkerMonoHydrolized*LYS_P52732_A_64;
  v51: LYS_P52732_A_77 + CrosslinkerMonoHydrolized => MonoHydro_P52732_A_77; klys_P52732_A_77*CrosslinkerMonoHydrolized*LYS_P52732_A_77;
  v52: LYS_P52732_A_146 + CrosslinkerMonoHydrolized => MonoHydro_P52732_A_146; klys_P52732_A_146*CrosslinkerMonoHydrolized*LYS_P52732_A_146;
  v53: LYS_P52732_A_157 + CrosslinkerMonoHydrolized => MonoHydro_P52732_A_157; klys_P52732_A_157*CrosslinkerMonoHydrolized*LYS_P52732_A_157;
  v54: LYS_P52732_A_191 + CrosslinkerMonoHydrolized => MonoHydro_P52732_A_191; klys_P52732_A_191*CrosslinkerMonoHydrolized*LYS_P52732_A_191;
  v55: LYS_P52732_A_197 + CrosslinkerMonoHydrolized => MonoHydro_P52732_A_197; klys_P52732_A_197*CrosslinkerMonoHydrolized*LYS_P52732_A_197;
  v56: LYS_P52732_A_207 + CrosslinkerMonoHydrolized => MonoHydro_P52732_A_207; klys_P52732_A_207*CrosslinkerMonoHydrolized*LYS_P52732_A_207;
  v57: LYS_P52732_A_216 + CrosslinkerMonoHydrolized => MonoHydro_P52732_A_216; klys_P52732_A_216*CrosslinkerMonoHydrolized*LYS_P52732_A_216;
  v58: LYS_P52732_A_220 + CrosslinkerMonoHydrolized => MonoHydro_P52732_A_220; klys_P52732_A_220*CrosslinkerMonoHydrolized*LYS_P52732_A_220;
  v59: LYS_P52732_A_246 + CrosslinkerMonoHydrolized => MonoHydro_P52732_A_246; klys_P52732_A_246*CrosslinkerMonoHydrolized*LYS_P52732_A_246;
  v60: LYS_P52732_A_257 + CrosslinkerMonoHydrolized => MonoHydro_P52732_A_257; klys_P52732_A_257*CrosslinkerMonoHydrolized*LYS_P52732_A_257;
  v61: LYS_P52732_A_260 + CrosslinkerMonoHydrolized => MonoHydro_P52732_A_260; klys_P52732_A_260*CrosslinkerMonoHydrolized*LYS_P52732_A_260;
  v62: LYS_P52732_A_315 + CrosslinkerMonoHydrolized => MonoHydro_P52732_A_315; klys_P52732_A_315*CrosslinkerMonoHydrolized*LYS_P52732_A_315;
  v63: LYS_P52732_A_357 + CrosslinkerMonoHydrolized => MonoHydro_P52732_A_357; klys_P52732_A_357*CrosslinkerMonoHydrolized*LYS_P52732_A_357;
  v64: LYS_P52732_A_362 + CrosslinkerMonoHydrolized => MonoHydro_P52732_A_362; klys_P52732_A_362*CrosslinkerMonoHydrolized*LYS_P52732_A_362;
  v65: LYS_P52732_A_368 + CrosslinkerMonoHydrolized => MonoHydro_P52732_A_368; klys_P52732_A_368*CrosslinkerMonoHydrolized*LYS_P52732_A_368;
  v66: LYS_P52732_A_15 + Mono_P52732_A_17 => XL_P52732_A_15_P52732_A_17; kon_xl_P52732_A_15_P52732_A_17*klys_P52732_A_15/kon*LYS_P52732_A_15*Mono_P52732_A_17;
  v67: LYS_P52732_A_15 + Mono_P52732_A_48 => XL_P52732_A_15_P52732_A_48; kon_xl_P52732_A_15_P52732_A_48*klys_P52732_A_15/kon*LYS_P52732_A_15*Mono_P52732_A_48;
  v68: LYS_P52732_A_15 + Mono_P52732_A_191 => XL_P52732_A_15_P52732_A_191; kon_xl_P52732_A_15_P52732_A_191*klys_P52732_A_15/kon*LYS_P52732_A_15*Mono_P52732_A_191;
  v69: LYS_P52732_A_15 + Mono_P52732_A_257 => XL_P52732_A_15_P52732_A_257; kon_xl_P52732_A_15_P52732_A_257*klys_P52732_A_15/kon*LYS_P52732_A_15*Mono_P52732_A_257;
  v70: LYS_P52732_A_15 + Mono_P52732_A_357 => XL_P52732_A_15_P52732_A_357; kon_xl_P52732_A_15_P52732_A_357*klys_P52732_A_15/kon*LYS_P52732_A_15*Mono_P52732_A_357;
  v71: LYS_P52732_A_15 + Mono_P52732_A_362 => XL_P52732_A_15_P52732_A_362; kon_xl_P52732_A_15_P52732_A_362*klys_P52732_A_15/kon*LYS_P52732_A_15*Mono_P52732_A_362;
  v72: LYS_P52732_A_15 + Mono_P52732_A_368 => XL_P52732_A_15_P52732_A_368; kon_xl_P52732_A_15_P52732_A_368*klys_P52732_A_15/kon*LYS_P52732_A_15*Mono_P52732_A_368;
  v73: LYS_P52732_A_17 + Mono_P52732_A_15 => XL_P52732_A_15_P52732_A_17; kon_xl_P52732_A_15_P52732_A_17*klys_P52732_A_17/kon*LYS_P52732_A_17*Mono_P52732_A_15;
  v74: LYS_P52732_A_17 + Mono_P52732_A_48 => XL_P52732_A_17_P52732_A_48; kon_xl_P52732_A_17_P52732_A_48*klys_P52732_A_17/kon*LYS_P52732_A_17*Mono_P52732_A_48;
  v75: LYS_P52732_A_17 + Mono_P52732_A_146 => XL_P52732_A_17_P52732_A_146; kon_xl_P52732_A_17_P52732_A_146*klys_P52732_A_17/kon*LYS_P52732_A_17*Mono_P52732_A_146;
  v76: LYS_P52732_A_17 + Mono_P52732_A_257 => XL_P52732_A_17_P52732_A_257; kon_xl_P52732_A_17_P52732_A_257*klys_P52732_A_17/kon*LYS_P52732_A_17*Mono_P52732_A_257;
  v77: LYS_P52732_A_17 + Mono_P52732_A_357 => XL_P52732_A_17_P52732_A_357; kon_xl_P52732_A_17_P52732_A_357*klys_P52732_A_17/kon*LYS_P52732_A_17*Mono_P52732_A_357;
  v78: LYS_P52732_A_17 + Mono_P52732_A_362 => XL_P52732_A_17_P52732_A_362; kon_xl_P52732_A_17_P52732_A_362*klys_P52732_A_17/kon*LYS_P52732_A_17*Mono_P52732_A_362;
  v79: LYS_P52732_A_17 + Mono_P52732_A_368 => XL_P52732_A_17_P52732_A_368; kon_xl_P52732_A_17_P52732_A_368*klys_P52732_A_17/kon*LYS_P52732_A_17*Mono_P52732_A_368;
  v80: LYS_P52732_A_34 + Mono_P52732_A_77 => XL_P52732_A_34_P52732_A_77; kon_xl_P52732_A_34_P52732_A_77*klys_P52732_A_34/kon*LYS_P52732_A_34*Mono_P52732_A_77;
  v81: LYS_P52732_A_48 + Mono_P52732_A_15 => XL_P52732_A_15_P52732_A_48; kon_xl_P52732_A_15_P52732_A_48*klys_P52732_A_48/kon*LYS_P52732_A_48*Mono_P52732_A_15;
  v82: LYS_P52732_A_48 + Mono_P52732_A_17 => XL_P52732_A_17_P52732_A_48; kon_xl_P52732_A_17_P52732_A_48*klys_P52732_A_48/kon*LYS_P52732_A_48*Mono_P52732_A_17;
  v83: LYS_P52732_A_48 + Mono_P52732_A_64 => XL_P52732_A_48_P52732_A_64; kon_xl_P52732_A_48_P52732_A_64*klys_P52732_A_48/kon*LYS_P52732_A_48*Mono_P52732_A_64;
  v84: LYS_P52732_A_48 + Mono_P52732_A_77 => XL_P52732_A_48_P52732_A_77; kon_xl_P52732_A_48_P52732_A_77*klys_P52732_A_48/kon*LYS_P52732_A_48*Mono_P52732_A_77;
  v85: LYS_P52732_A_48 + Mono_P52732_A_357 => XL_P52732_A_48_P52732_A_357; kon_xl_P52732_A_48_P52732_A_357*klys_P52732_A_48/kon*LYS_P52732_A_48*Mono_P52732_A_357;
  v86: LYS_P52732_A_48 + Mono_P52732_A_362 => XL_P52732_A_48_P52732_A_362; kon_xl_P52732_A_48_P52732_A_362*klys_P52732_A_48/kon*LYS_P52732_A_48*Mono_P52732_A_362;
  v87: LYS_P52732_A_60 + Mono_P52732_A_64 => XL_P52732_A_60_P52732_A_64; kon_xl_P52732_A_60_P52732_A_64*klys_P52732_A_60/kon*LYS_P52732_A_60*Mono_P52732_A_64;
  v88: LYS_P52732_A_64 + Mono_P52732_A_48 => XL_P52732_A_48_P52732_A_64; kon_xl_P52732_A_48_P52732_A_64*klys_P52732_A_64/kon*LYS_P52732_A_64*Mono_P52732_A_48;
  v89: LYS_P52732_A_64 + Mono_P52732_A_60 => XL_P52732_A_60_P52732_A_64; kon_xl_P52732_A_60_P52732_A_64*klys_P52732_A_64/kon*LYS_P52732_A_64*Mono_P52732_A_60;
  v90: LYS_P52732_A_64 + Mono_P52732_A_357 => XL_P52732_A_64_P52732_A_357; kon_xl_P52732_A_64_P52732_A_357*klys_P52732_A_64/kon*LYS_P52732_A_64*Mono_P52732_A_357;
  v91: LYS_P52732_A_77 + Mono_P52732_A_34 => XL_P52732_A_34_P52732_A_77; kon_xl_P52732_A_34_P52732_A_77*klys_P52732_A_77/kon*LYS_P52732_A_77*Mono_P52732_A_34;
  v92: LYS_P52732_A_77 + Mono_P52732_A_48 => XL_P52732_A_48_P52732_A_77; kon_xl_P52732_A_48_P52732_A_77*klys_P52732_A_77/kon*LYS_P52732_A_77*Mono_P52732_A_48;
  v93: LYS_P52732_A_77 + Mono_P52732_A_207 => XL_P52732_A_77_P52732_A_207; kon_xl_P52732_A_77_P52732_A_207*klys_P52732_A_77/kon*LYS_P52732_A_77*Mono_P52732_A_207;
  v94: LYS_P52732_A_146 + Mono_P52732_A_17 => XL_P52732_A_17_P52732_A_146; kon_xl_P52732_A_17_P52732_A_146*klys_P52732_A_146/kon*LYS_P52732_A_146*Mono_P52732_A_17;
  v95: LYS_P52732_A_146 + Mono_P52732_A_207 => XL_P52732_A_146_P52732_A_207; kon_xl_P52732_A_146_P52732_A_207*klys_P52732_A_146/kon*LYS_P52732_A_146*Mono_P52732_A_207;
  v96: LYS_P52732_A_146 + Mono_P52732_A_246 => XL_P52732_A_146_P52732_A_246; kon_xl_P52732_A_146_P52732_A_246*klys_P52732_A_146/kon*LYS_P52732_A_146*Mono_P52732_A_246;
  v97: LYS_P52732_A_146 + Mono_P52732_A_257 => XL_P52732_A_146_P52732_A_257; kon_xl_P52732_A_146_P52732_A_257*klys_P52732_A_146/kon*LYS_P52732_A_146*Mono_P52732_A_257;
  v98: LYS_P52732_A_157 + Mono_P52732_A_191 => XL_P52732_A_157_P52732_A_191; kon_xl_P52732_A_157_P52732_A_191*klys_P52732_A_157/kon*LYS_P52732_A_157*Mono_P52732_A_191;
  v99: LYS_P52732_A_157 + Mono_P52732_A_197 => XL_P52732_A_157_P52732_A_197; kon_xl_P52732_A_157_P52732_A_197*klys_P52732_A_157/kon*LYS_P52732_A_157*Mono_P52732_A_197;
  v100: LYS_P52732_A_157 + Mono_P52732_A_207 => XL_P52732_A_157_P52732_A_207; kon_xl_P52732_A_157_P52732_A_207*klys_P52732_A_157/kon*LYS_P52732_A_157*Mono_P52732_A_207;
  v101: LYS_P52732_A_157 + Mono_P52732_A_216 => XL_P52732_A_157_P52732_A_216; kon_xl_P52732_A_157_P52732_A_216*klys_P52732_A_157/kon*LYS_P52732_A_157*Mono_P52732_A_216;
  v102: LYS_P52732_A_157 + Mono_P52732_A_220 => XL_P52732_A_157_P52732_A_220; kon_xl_P52732_A_157_P52732_A_220*klys_P52732_A_157/kon*LYS_P52732_A_157*Mono_P52732_A_220;
  v103: LYS_P52732_A_157 + Mono_P52732_A_246 => XL_P52732_A_157_P52732_A_246; kon_xl_P52732_A_157_P52732_A_246*klys_P52732_A_157/kon*LYS_P52732_A_157*Mono_P52732_A_246;
  v104: LYS_P52732_A_157 + Mono_P52732_A_260 => XL_P52732_A_157_P52732_A_260; kon_xl_P52732_A_157_P52732_A_260*klys_P52732_A_157/kon*LYS_P52732_A_157*Mono_P52732_A_260;
  v105: LYS_P52732_A_157 + Mono_P52732_A_368 => XL_P52732_A_157_P52732_A_368; kon_xl_P52732_A_157_P52732_A_368*klys_P52732_A_157/kon*LYS_P52732_A_157*Mono_P52732_A_368;
  v106: LYS_P52732_A_191 + Mono_P52732_A_15 => XL_P52732_A_15_P52732_A_191; kon_xl_P52732_A_15_P52732_A_191*klys_P52732_A_191/kon*LYS_P52732_A_191*Mono_P52732_A_15;
  v107: LYS_P52732_A_191 + Mono_P52732_A_157 => XL_P52732_A_157_P52732_A_191; kon_xl_P52732_A_157_P52732_A_191*klys_P52732_A_191/kon*LYS_P52732_A_191*Mono_P52732_A_157;
  v108: LYS_P52732_A_191 + Mono_P52732_A_197 => XL_P52732_A_191_P52732_A_197; kon_xl_P52732_A_191_P52732_A_197*klys_P52732_A_191/kon*LYS_P52732_A_191*Mono_P52732_A_197;
  v109: LYS_P52732_A_191 + Mono_P52732_A_260 => XL_P52732_A_191_P52732_A_260; kon_xl_P52732_A_191_P52732_A_260*klys_P52732_A_191/kon*LYS_P52732_A_191*Mono_P52732_A_260;
  v110: LYS_P52732_A_191 + Mono_P52732_A_315 => XL_P52732_A_191_P52732_A_315; kon_xl_P52732_A_191_P52732_A_315*klys_P52732_A_191/kon*LYS_P52732_A_191*Mono_P52732_A_315;
  v111: LYS_P52732_A_191 + Mono_P52732_A_362 => XL_P52732_A_191_P52732_A_362; kon_xl_P52732_A_191_P52732_A_362*klys_P52732_A_191/kon*LYS_P52732_A_191*Mono_P52732_A_362;
  v112: LYS_P52732_A_191 + Mono_P52732_A_368 => XL_P52732_A_191_P52732_A_368; kon_xl_P52732_A_191_P52732_A_368*klys_P52732_A_191/kon*LYS_P52732_A_191*Mono_P52732_A_368;
  v113: LYS_P52732_A_197 + Mono_P52732_A_157 => XL_P52732_A_157_P52732_A_197; kon_xl_P52732_A_157_P52732_A_197*klys_P52732_A_197/kon*LYS_P52732_A_197*Mono_P52732_A_157;
  v114: LYS_P52732_A_197 + Mono_P52732_A_191 => XL_P52732_A_191_P52732_A_197; kon_xl_P52732_A_191_P52732_A_197*klys_P52732_A_197/kon*LYS_P52732_A_197*Mono_P52732_A_191;
  v115: LYS_P52732_A_197 + Mono_P52732_A_220 => XL_P52732_A_197_P52732_A_220; kon_xl_P52732_A_197_P52732_A_220*klys_P52732_A_197/kon*LYS_P52732_A_197*Mono_P52732_A_220;
  v116: LYS_P52732_A_197 + Mono_P52732_A_246 => XL_P52732_A_197_P52732_A_246; kon_xl_P52732_A_197_P52732_A_246*klys_P52732_A_197/kon*LYS_P52732_A_197*Mono_P52732_A_246;
  v117: LYS_P52732_A_197 + Mono_P52732_A_260 => XL_P52732_A_197_P52732_A_260; kon_xl_P52732_A_197_P52732_A_260*klys_P52732_A_197/kon*LYS_P52732_A_197*Mono_P52732_A_260;
  v118: LYS_P52732_A_197 + Mono_P52732_A_315 => XL_P52732_A_197_P52732_A_315; kon_xl_P52732_A_197_P52732_A_315*klys_P52732_A_197/kon*LYS_P52732_A_197*Mono_P52732_A_315;
  v119: LYS_P52732_A_197 + Mono_P52732_A_368 => XL_P52732_A_197_P52732_A_368; kon_xl_P52732_A_197_P52732_A_368*klys_P52732_A_197/kon*LYS_P52732_A_197*Mono_P52732_A_368;
  v120: LYS_P52732_A_207 + Mono_P52732_A_77 => XL_P52732_A_77_P52732_A_207; kon_xl_P52732_A_77_P52732_A_207*klys_P52732_A_207/kon*LYS_P52732_A_207*Mono_P52732_A_77;
  v121: LYS_P52732_A_207 + Mono_P52732_A_146 => XL_P52732_A_146_P52732_A_207; kon_xl_P52732_A_146_P52732_A_207*klys_P52732_A_207/kon*LYS_P52732_A_207*Mono_P52732_A_146;
  v122: LYS_P52732_A_207 + Mono_P52732_A_157 => XL_P52732_A_157_P52732_A_207; kon_xl_P52732_A_157_P52732_A_207*klys_P52732_A_207/kon*LYS_P52732_A_207*Mono_P52732_A_157;
  v123: LYS_P52732_A_207 + Mono_P52732_A_216 => XL_P52732_A_207_P52732_A_216; kon_xl_P52732_A_207_P52732_A_216*klys_P52732_A_207/kon*LYS_P52732_A_207*Mono_P52732_A_216;
  v124: LYS_P52732_A_207 + Mono_P52732_A_246 => XL_P52732_A_207_P52732_A_246; kon_xl_P52732_A_207_P52732_A_246*klys_P52732_A_207/kon*LYS_P52732_A_207*Mono_P52732_A_246;
  v125: LYS_P52732_A_216 + Mono_P52732_A_157 => XL_P52732_A_157_P52732_A_216; kon_xl_P52732_A_157_P52732_A_216*klys_P52732_A_216/kon*LYS_P52732_A_216*Mono_P52732_A_157;
  v126: LYS_P52732_A_216 + Mono_P52732_A_207 => XL_P52732_A_207_P52732_A_216; kon_xl_P52732_A_207_P52732_A_216*klys_P52732_A_216/kon*LYS_P52732_A_216*Mono_P52732_A_207;
  v127: LYS_P52732_A_216 + Mono_P52732_A_220 => XL_P52732_A_216_P52732_A_220; kon_xl_P52732_A_216_P52732_A_220*klys_P52732_A_216/kon*LYS_P52732_A_216*Mono_P52732_A_220;
  v128: LYS_P52732_A_220 + Mono_P52732_A_157 => XL_P52732_A_157_P52732_A_220; kon_xl_P52732_A_157_P52732_A_220*klys_P52732_A_220/kon*LYS_P52732_A_220*Mono_P52732_A_157;
  v129: LYS_P52732_A_220 + Mono_P52732_A_197 => XL_P52732_A_197_P52732_A_220; kon_xl_P52732_A_197_P52732_A_220*klys_P52732_A_220/kon*LYS_P52732_A_220*Mono_P52732_A_197;
  v130: LYS_P52732_A_220 + Mono_P52732_A_216 => XL_P52732_A_216_P52732_A_220; kon_xl_P52732_A_216_P52732_A_220*klys_P52732_A_220/kon*LYS_P52732_A_220*Mono_P52732_A_216;
  v131: LYS_P52732_A_246 + Mono_P52732_A_146 => XL_P52732_A_146_P52732_A_246; kon_xl_P52732_A_146_P52732_A_246*klys_P52732_A_246/kon*LYS_P52732_A_246*Mono_P52732_A_146;
  v132: LYS_P52732_A_246 + Mono_P52732_A_157 => XL_P52732_A_157_P52732_A_246; kon_xl_P52732_A_157_P52732_A_246*klys_P52732_A_246/kon*LYS_P52732_A_246*Mono_P52732_A_157;
  v133: LYS_P52732_A_246 + Mono_P52732_A_197 => XL_P52732_A_197_P52732_A_246; kon_xl_P52732_A_197_P52732_A_246*klys_P52732_A_246/kon*LYS_P52732_A_246*Mono_P52732_A_197;
  v134: LYS_P52732_A_246 + Mono_P52732_A_207 => XL_P52732_A_207_P52732_A_246; kon_xl_P52732_A_207_P52732_A_246*klys_P52732_A_246/kon*LYS_P52732_A_246*Mono_P52732_A_207;
  v135: LYS_P52732_A_246 + Mono_P52732_A_257 => XL_P52732_A_246_P52732_A_257; kon_xl_P52732_A_246_P52732_A_257*klys_P52732_A_246/kon*LYS_P52732_A_246*Mono_P52732_A_257;
  v136: LYS_P52732_A_246 + Mono_P52732_A_260 => XL_P52732_A_246_P52732_A_260; kon_xl_P52732_A_246_P52732_A_260*klys_P52732_A_246/kon*LYS_P52732_A_246*Mono_P52732_A_260;
  v137: LYS_P52732_A_246 + Mono_P52732_A_362 => XL_P52732_A_246_P52732_A_362; kon_xl_P52732_A_246_P52732_A_362*klys_P52732_A_246/kon*LYS_P52732_A_246*Mono_P52732_A_362;
  v138: LYS_P52732_A_246 + Mono_P52732_A_368 => XL_P52732_A_246_P52732_A_368; kon_xl_P52732_A_246_P52732_A_368*klys_P52732_A_246/kon*LYS_P52732_A_246*Mono_P52732_A_368;
  v139: LYS_P52732_A_257 + Mono_P52732_A_15 => XL_P52732_A_15_P52732_A_257; kon_xl_P52732_A_15_P52732_A_257*klys_P52732_A_257/kon*LYS_P52732_A_257*Mono_P52732_A_15;
  v140: LYS_P52732_A_257 + Mono_P52732_A_17 => XL_P52732_A_17_P52732_A_257; kon_xl_P52732_A_17_P52732_A_257*klys_P52732_A_257/kon*LYS_P52732_A_257*Mono_P52732_A_17;
  v141: LYS_P52732_A_257 + Mono_P52732_A_146 => XL_P52732_A_146_P52732_A_257; kon_xl_P52732_A_146_P52732_A_257*klys_P52732_A_257/kon*LYS_P52732_A_257*Mono_P52732_A_146;
  v142: LYS_P52732_A_257 + Mono_P52732_A_246 => XL_P52732_A_246_P52732_A_257; kon_xl_P52732_A_246_P52732_A_257*klys_P52732_A_257/kon*LYS_P52732_A_257*Mono_P52732_A_246;
  v143: LYS_P52732_A_257 + Mono_P52732_A_362 => XL_P52732_A_257_P52732_A_362; kon_xl_P52732_A_257_P52732_A_362*klys_P52732_A_257/kon*LYS_P52732_A_257*Mono_P52732_A_362;
  v144: LYS_P52732_A_257 + Mono_P52732_A_368 => XL_P52732_A_257_P52732_A_368; kon_xl_P52732_A_257_P52732_A_368*klys_P52732_A_257/kon*LYS_P52732_A_257*Mono_P52732_A_368;
  v145: LYS_P52732_A_260 + Mono_P52732_A_157 => XL_P52732_A_157_P52732_A_260; kon_xl_P52732_A_157_P52732_A_260*klys_P52732_A_260/kon*LYS_P52732_A_260*Mono_P52732_A_157;
  v146: LYS_P52732_A_260 + Mono_P52732_A_191 => XL_P52732_A_191_P52732_A_260; kon_xl_P52732_A_191_P52732_A_260*klys_P52732_A_260/kon*LYS_P52732_A_260*Mono_P52732_A_191;
  v147: LYS_P52732_A_260 + Mono_P52732_A_197 => XL_P52732_A_197_P52732_A_260; kon_xl_P52732_A_197_P52732_A_260*klys_P52732_A_260/kon*LYS_P52732_A_260*Mono_P52732_A_197;
  v148: LYS_P52732_A_260 + Mono_P52732_A_246 => XL_P52732_A_246_P52732_A_260; kon_xl_P52732_A_246_P52732_A_260*klys_P52732_A_260/kon*LYS_P52732_A_260*Mono_P52732_A_246;
  v149: LYS_P52732_A_260 + Mono_P52732_A_362 => XL_P52732_A_260_P52732_A_362; kon_xl_P52732_A_260_P52732_A_362*klys_P52732_A_260/kon*LYS_P52732_A_260*Mono_P52732_A_362;
  v150: LYS_P52732_A_260 + Mono_P52732_A_368 => XL_P52732_A_260_P52732_A_368; kon_xl_P52732_A_260_P52732_A_368*klys_P52732_A_260/kon*LYS_P52732_A_260*Mono_P52732_A_368;
  v151: LYS_P52732_A_315 + Mono_P52732_A_191 => XL_P52732_A_191_P52732_A_315; kon_xl_P52732_A_191_P52732_A_315*klys_P52732_A_315/kon*LYS_P52732_A_315*Mono_P52732_A_191;
  v152: LYS_P52732_A_315 + Mono_P52732_A_197 => XL_P52732_A_197_P52732_A_315; kon_xl_P52732_A_197_P52732_A_315*klys_P52732_A_315/kon*LYS_P52732_A_315*Mono_P52732_A_197;
  v153: LYS_P52732_A_357 + Mono_P52732_A_15 => XL_P52732_A_15_P52732_A_357; kon_xl_P52732_A_15_P52732_A_357*klys_P52732_A_357/kon*LYS_P52732_A_357*Mono_P52732_A_15;
  v154: LYS_P52732_A_357 + Mono_P52732_A_17 => XL_P52732_A_17_P52732_A_357; kon_xl_P52732_A_17_P52732_A_357*klys_P52732_A_357/kon*LYS_P52732_A_357*Mono_P52732_A_17;
  v155: LYS_P52732_A_357 + Mono_P52732_A_48 => XL_P52732_A_48_P52732_A_357; kon_xl_P52732_A_48_P52732_A_357*klys_P52732_A_357/kon*LYS_P52732_A_357*Mono_P52732_A_48;
  v156: LYS_P52732_A_357 + Mono_P52732_A_64 => XL_P52732_A_64_P52732_A_357; kon_xl_P52732_A_64_P52732_A_357*klys_P52732_A_357/kon*LYS_P52732_A_357*Mono_P52732_A_64;
  v157: LYS_P52732_A_357 + Mono_P52732_A_362 => XL_P52732_A_357_P52732_A_362; kon_xl_P52732_A_357_P52732_A_362*klys_P52732_A_357/kon*LYS_P52732_A_357*Mono_P52732_A_362;
  v158: LYS_P52732_A_362 + Mono_P52732_A_15 => XL_P52732_A_15_P52732_A_362; kon_xl_P52732_A_15_P52732_A_362*klys_P52732_A_362/kon*LYS_P52732_A_362*Mono_P52732_A_15;
  v159: LYS_P52732_A_362 + Mono_P52732_A_17 => XL_P52732_A_17_P52732_A_362; kon_xl_P52732_A_17_P52732_A_362*klys_P52732_A_362/kon*LYS_P52732_A_362*Mono_P52732_A_17;
  v160: LYS_P52732_A_362 + Mono_P52732_A_48 => XL_P52732_A_48_P52732_A_362; kon_xl_P52732_A_48_P52732_A_362*klys_P52732_A_362/kon*LYS_P52732_A_362*Mono_P52732_A_48;
  v161: LYS_P52732_A_362 + Mono_P52732_A_191 => XL_P52732_A_191_P52732_A_362; kon_xl_P52732_A_191_P52732_A_362*klys_P52732_A_362/kon*LYS_P52732_A_362*Mono_P52732_A_191;
  v162: LYS_P52732_A_362 + Mono_P52732_A_246 => XL_P52732_A_246_P52732_A_362; kon_xl_P52732_A_246_P52732_A_362*klys_P52732_A_362/kon*LYS_P52732_A_362*Mono_P52732_A_246;
  v163: LYS_P52732_A_362 + Mono_P52732_A_257 => XL_P52732_A_257_P52732_A_362; kon_xl_P52732_A_257_P52732_A_362*klys_P52732_A_362/kon*LYS_P52732_A_362*Mono_P52732_A_257;
  v164: LYS_P52732_A_362 + Mono_P52732_A_260 => XL_P52732_A_260_P52732_A_362; kon_xl_P52732_A_260_P52732_A_362*klys_P52732_A_362/kon*LYS_P52732_A_362*Mono_P52732_A_260;
  v165: LYS_P52732_A_362 + Mono_P52732_A_357 => XL_P52732_A_357_P52732_A_362; kon_xl_P52732_A_357_P52732_A_362*klys_P52732_A_362/kon*LYS_P52732_A_362*Mono_P52732_A_357;
  v166: LYS_P52732_A_362 + Mono_P52732_A_368 => XL_P52732_A_362_P52732_A_368; kon_xl_P52732_A_362_P52732_A_368*klys_P52732_A_362/kon*LYS_P52732_A_362*Mono_P52732_A_368;
  v167: LYS_P52732_A_368 + Mono_P52732_A_15 => XL_P52732_A_15_P52732_A_368; kon_xl_P52732_A_15_P52732_A_368*klys_P52732_A_368/kon*LYS_P52732_A_368*Mono_P52732_A_15;
  v168: LYS_P52732_A_368 + Mono_P52732_A_17 => XL_P52732_A_17_P52732_A_368; kon_xl_P52732_A_17_P52732_A_368*klys_P52732_A_368/kon*LYS_P52732_A_368*Mono_P52732_A_17;
  v169: LYS_P52732_A_368 + Mono_P52732_A_157 => XL_P52732_A_157_P52732_A_368; kon_xl_P52732_A_157_P52732_A_368*klys_P52732_A_368/kon*LYS_P52732_A_368*Mono_P52732_A_157;
  v170: LYS_P52732_A_368 + Mono_P52732_A_191 => XL_P52732_A_191_P52732_A_368; kon_xl_P52732_A_191_P52732_A_368*klys_P52732_A_368/kon*LYS_P52732_A_368*Mono_P52732_A_191;
  v171: LYS_P52732_A_368 + Mono_P52732_A_197 => XL_P52732_A_197_P52732_A_368; kon_xl_P52732_A_197_P52732_A_368*klys_P52732_A_368/kon*LYS_P52732_A_368*Mono_P52732_A_197;
  v172: LYS_P52732_A_368 + Mono_P52732_A_246 => XL_P52732_A_246_P52732_A_368; kon_xl_P52732_A_246_P52732_A_368*klys_P52732_A_368/kon*LYS_P52732_A_368*Mono_P52732_A_246;
  v173: LYS_P52732_A_368 + Mono_P52732_A_257 => XL_P52732_A_257_P52732_A_368; kon_xl_P52732_A_257_P52732_A_368*klys_P52732_A_368/kon*LYS_P52732_A_368*Mono_P52732_A_257;
  v174: LYS_P52732_A_368 + Mono_P52732_A_260 => XL_P52732_A_260_P52732_A_368; kon_xl_P52732_A_260_P52732_A_368*klys_P52732_A_368/kon*LYS_P52732_A_368*Mono_P52732_A_260;
  v175: LYS_P52732_A_368 + Mono_P52732_A_362 => XL_P52732_A_362_P52732_A_368; kon_xl_P52732_A_362_P52732_A_368*klys_P52732_A_368/kon*LYS_P52732_A_368*Mono_P52732_A_362;

  // Unit definitions:
  unit per_second = 1 / second;
  unit litre_per_mole_per_second = litre / (mole * second);
end
