// SBML level 3 version 1

model main()
  // model units - substance: mole, time: second, extent: mole

  // Compartments:
  compartment c1 = 1 litre;

  // Species:
  species Crosslinker in c1 = 0.0002452748/c1;
  species CrosslinkerMonoHydrolized in c1 = 0;
  species CrosslinkerBiHydrolized in c1 = 0;
  species LYS_P52732_A_15 in c1 = 2.335951e-5/c1;
  species LYS_P52732_A_17 in c1 = 2.335951e-5/c1;
  species LYS_P52732_A_34 in c1 = 2.335951e-5/c1;
  species LYS_P52732_A_48 in c1 = 2.335951e-5/c1;
  species LYS_P52732_A_60 in c1 = 2.335951e-5/c1;
  species LYS_P52732_A_64 in c1 = 2.335951e-5/c1;
  species LYS_P52732_A_77 in c1 = 2.335951e-5/c1;
  species LYS_P52732_A_146 in c1 = 2.335951e-5/c1;
  species LYS_P52732_A_157 in c1 = 2.335951e-5/c1;
  species LYS_P52732_A_191 in c1 = 2.335951e-5/c1;
  species LYS_P52732_A_197 in c1 = 2.335951e-5/c1;
  species LYS_P52732_A_207 in c1 = 2.335951e-5/c1;
  species LYS_P52732_A_216 in c1 = 2.335951e-5/c1;
  species LYS_P52732_A_220 in c1 = 2.335951e-5/c1;
  species LYS_P52732_A_246 in c1 = 2.335951e-5/c1;
  species LYS_P52732_A_257 in c1 = 2.335951e-5/c1;
  species LYS_P52732_A_260 in c1 = 2.335951e-5/c1;
  species LYS_P52732_A_315 in c1 = 2.335951e-5/c1;
  species LYS_P52732_A_357 in c1 = 2.335951e-5/c1;
  species LYS_P52732_A_362 in c1 = 2.335951e-5/c1;
  species LYS_P52732_A_368 in c1 = 2.335951e-5/c1;
  species Mono_P52732_A_15 in c1 = 0;
  species Mono_P52732_A_17 in c1 = 0;
  species Mono_P52732_A_34 in c1 = 0;
  species Mono_P52732_A_48 in c1 = 0;
  species Mono_P52732_A_60 in c1 = 0;
  species Mono_P52732_A_64 in c1 = 0;
  species Mono_P52732_A_77 in c1 = 0;
  species Mono_P52732_A_146 in c1 = 0;
  species Mono_P52732_A_157 in c1 = 0;
  species Mono_P52732_A_191 in c1 = 0;
  species Mono_P52732_A_197 in c1 = 0;
  species Mono_P52732_A_207 in c1 = 0;
  species Mono_P52732_A_216 in c1 = 0;
  species Mono_P52732_A_220 in c1 = 0;
  species Mono_P52732_A_246 in c1 = 0;
  species Mono_P52732_A_257 in c1 = 0;
  species Mono_P52732_A_260 in c1 = 0;
  species Mono_P52732_A_315 in c1 = 0;
  species Mono_P52732_A_357 in c1 = 0;
  species Mono_P52732_A_362 in c1 = 0;
  species Mono_P52732_A_368 in c1 = 0;
  species MonoHydro_P52732_A_15 in c1 = 0;
  species MonoHydro_P52732_A_17 in c1 = 0;
  species MonoHydro_P52732_A_34 in c1 = 0;
  species MonoHydro_P52732_A_48 in c1 = 0;
  species MonoHydro_P52732_A_60 in c1 = 0;
  species MonoHydro_P52732_A_64 in c1 = 0;
  species MonoHydro_P52732_A_77 in c1 = 0;
  species MonoHydro_P52732_A_146 in c1 = 0;
  species MonoHydro_P52732_A_157 in c1 = 0;
  species MonoHydro_P52732_A_191 in c1 = 0;
  species MonoHydro_P52732_A_197 in c1 = 0;
  species MonoHydro_P52732_A_207 in c1 = 0;
  species MonoHydro_P52732_A_216 in c1 = 0;
  species MonoHydro_P52732_A_220 in c1 = 0;
  species MonoHydro_P52732_A_246 in c1 = 0;
  species MonoHydro_P52732_A_257 in c1 = 0;
  species MonoHydro_P52732_A_260 in c1 = 0;
  species MonoHydro_P52732_A_315 in c1 = 0;
  species MonoHydro_P52732_A_357 in c1 = 0;
  species MonoHydro_P52732_A_362 in c1 = 0;
  species MonoHydro_P52732_A_368 in c1 = 0;

  // Parameters:
  kh = 2.5e-5 per_second;
  kon = 10000000 litre_per_mole_per_second;
  koff = 1000000000 per_second;
  MolecularWeight = 42809.1193 per_second;
  NumLys = 21 per_second;
  pH = 7 per_second;
  klys_P52732_A_15 = 0.6955095 per_second;
  klys_P52732_A_17 = 0.426907 per_second;
  klys_P52732_A_34 = 0.5824595 per_second;
  klys_P52732_A_48 = 0.2117506 per_second;
  klys_P52732_A_60 = 0.705701 per_second;
  klys_P52732_A_64 = 0.1945326 per_second;
  klys_P52732_A_77 = 0.448596 per_second;
  klys_P52732_A_146 = 0.09301482 per_second;
  klys_P52732_A_157 = 0.2362781 per_second;
  klys_P52732_A_191 = 0.6429388 per_second;
  klys_P52732_A_197 = 0.4590491 per_second;
  klys_P52732_A_207 = 0.152232 per_second;
  klys_P52732_A_216 = 0.4449919 per_second;
  klys_P52732_A_220 = 0.01749909 per_second;
  klys_P52732_A_246 = 0.2530779 per_second;
  klys_P52732_A_257 = 0.03895754 per_second;
  klys_P52732_A_260 = 0.1752431 per_second;
  klys_P52732_A_315 = 0.2050016 per_second;
  klys_P52732_A_357 = 0.1406463 per_second;
  klys_P52732_A_362 = 0.5348097 per_second;
  klys_P52732_A_368 = 0.513017 per_second;

  // Reactions:
  v1: Crosslinker => CrosslinkerMonoHydrolized; kh*Crosslinker;
  v2: CrosslinkerMonoHydrolized => CrosslinkerBiHydrolized; kh*CrosslinkerMonoHydrolized;
  v3: LYS_P52732_A_15 + Crosslinker => Mono_P52732_A_15; klys_P52732_A_15*Crosslinker*LYS_P52732_A_15;
  v4: LYS_P52732_A_17 + Crosslinker => Mono_P52732_A_17; klys_P52732_A_17*Crosslinker*LYS_P52732_A_17;
  v5: LYS_P52732_A_34 + Crosslinker => Mono_P52732_A_34; klys_P52732_A_34*Crosslinker*LYS_P52732_A_34;
  v6: LYS_P52732_A_48 + Crosslinker => Mono_P52732_A_48; klys_P52732_A_48*Crosslinker*LYS_P52732_A_48;
  v7: LYS_P52732_A_60 + Crosslinker => Mono_P52732_A_60; klys_P52732_A_60*Crosslinker*LYS_P52732_A_60;
  v8: LYS_P52732_A_64 + Crosslinker => Mono_P52732_A_64; klys_P52732_A_64*Crosslinker*LYS_P52732_A_64;
  v9: LYS_P52732_A_77 + Crosslinker => Mono_P52732_A_77; klys_P52732_A_77*Crosslinker*LYS_P52732_A_77;
  v10: LYS_P52732_A_146 + Crosslinker => Mono_P52732_A_146; klys_P52732_A_146*Crosslinker*LYS_P52732_A_146;
  v11: LYS_P52732_A_157 + Crosslinker => Mono_P52732_A_157; klys_P52732_A_157*Crosslinker*LYS_P52732_A_157;
  v12: LYS_P52732_A_191 + Crosslinker => Mono_P52732_A_191; klys_P52732_A_191*Crosslinker*LYS_P52732_A_191;
  v13: LYS_P52732_A_197 + Crosslinker => Mono_P52732_A_197; klys_P52732_A_197*Crosslinker*LYS_P52732_A_197;
  v14: LYS_P52732_A_207 + Crosslinker => Mono_P52732_A_207; klys_P52732_A_207*Crosslinker*LYS_P52732_A_207;
  v15: LYS_P52732_A_216 + Crosslinker => Mono_P52732_A_216; klys_P52732_A_216*Crosslinker*LYS_P52732_A_216;
  v16: LYS_P52732_A_220 + Crosslinker => Mono_P52732_A_220; klys_P52732_A_220*Crosslinker*LYS_P52732_A_220;
  v17: LYS_P52732_A_246 + Crosslinker => Mono_P52732_A_246; klys_P52732_A_246*Crosslinker*LYS_P52732_A_246;
  v18: LYS_P52732_A_257 + Crosslinker => Mono_P52732_A_257; klys_P52732_A_257*Crosslinker*LYS_P52732_A_257;
  v19: LYS_P52732_A_260 + Crosslinker => Mono_P52732_A_260; klys_P52732_A_260*Crosslinker*LYS_P52732_A_260;
  v20: LYS_P52732_A_315 + Crosslinker => Mono_P52732_A_315; klys_P52732_A_315*Crosslinker*LYS_P52732_A_315;
  v21: LYS_P52732_A_357 + Crosslinker => Mono_P52732_A_357; klys_P52732_A_357*Crosslinker*LYS_P52732_A_357;
  v22: LYS_P52732_A_362 + Crosslinker => Mono_P52732_A_362; klys_P52732_A_362*Crosslinker*LYS_P52732_A_362;
  v23: LYS_P52732_A_368 + Crosslinker => Mono_P52732_A_368; klys_P52732_A_368*Crosslinker*LYS_P52732_A_368;
  v24: Mono_P52732_A_15 => MonoHydro_P52732_A_15; kh*Mono_P52732_A_15;
  v25: Mono_P52732_A_17 => MonoHydro_P52732_A_17; kh*Mono_P52732_A_17;
  v26: Mono_P52732_A_34 => MonoHydro_P52732_A_34; kh*Mono_P52732_A_34;
  v27: Mono_P52732_A_48 => MonoHydro_P52732_A_48; kh*Mono_P52732_A_48;
  v28: Mono_P52732_A_60 => MonoHydro_P52732_A_60; kh*Mono_P52732_A_60;
  v29: Mono_P52732_A_64 => MonoHydro_P52732_A_64; kh*Mono_P52732_A_64;
  v30: Mono_P52732_A_77 => MonoHydro_P52732_A_77; kh*Mono_P52732_A_77;
  v31: Mono_P52732_A_146 => MonoHydro_P52732_A_146; kh*Mono_P52732_A_146;
  v32: Mono_P52732_A_157 => MonoHydro_P52732_A_157; kh*Mono_P52732_A_157;
  v33: Mono_P52732_A_191 => MonoHydro_P52732_A_191; kh*Mono_P52732_A_191;
  v34: Mono_P52732_A_197 => MonoHydro_P52732_A_197; kh*Mono_P52732_A_197;
  v35: Mono_P52732_A_207 => MonoHydro_P52732_A_207; kh*Mono_P52732_A_207;
  v36: Mono_P52732_A_216 => MonoHydro_P52732_A_216; kh*Mono_P52732_A_216;
  v37: Mono_P52732_A_220 => MonoHydro_P52732_A_220; kh*Mono_P52732_A_220;
  v38: Mono_P52732_A_246 => MonoHydro_P52732_A_246; kh*Mono_P52732_A_246;
  v39: Mono_P52732_A_257 => MonoHydro_P52732_A_257; kh*Mono_P52732_A_257;
  v40: Mono_P52732_A_260 => MonoHydro_P52732_A_260; kh*Mono_P52732_A_260;
  v41: Mono_P52732_A_315 => MonoHydro_P52732_A_315; kh*Mono_P52732_A_315;
  v42: Mono_P52732_A_357 => MonoHydro_P52732_A_357; kh*Mono_P52732_A_357;
  v43: Mono_P52732_A_362 => MonoHydro_P52732_A_362; kh*Mono_P52732_A_362;
  v44: Mono_P52732_A_368 => MonoHydro_P52732_A_368; kh*Mono_P52732_A_368;
  v45: LYS_P52732_A_15 + CrosslinkerMonoHydrolized => MonoHydro_P52732_A_15; klys_P52732_A_15*CrosslinkerMonoHydrolized*LYS_P52732_A_15;
  v46: LYS_P52732_A_17 + CrosslinkerMonoHydrolized => MonoHydro_P52732_A_17; klys_P52732_A_17*CrosslinkerMonoHydrolized*LYS_P52732_A_17;
  v47: LYS_P52732_A_34 + CrosslinkerMonoHydrolized => MonoHydro_P52732_A_34; klys_P52732_A_34*CrosslinkerMonoHydrolized*LYS_P52732_A_34;
  v48: LYS_P52732_A_48 + CrosslinkerMonoHydrolized => MonoHydro_P52732_A_48; klys_P52732_A_48*CrosslinkerMonoHydrolized*LYS_P52732_A_48;
  v49: LYS_P52732_A_60 + CrosslinkerMonoHydrolized => MonoHydro_P52732_A_60; klys_P52732_A_60*CrosslinkerMonoHydrolized*LYS_P52732_A_60;
  v50: LYS_P52732_A_64 + CrosslinkerMonoHydrolized => MonoHydro_P52732_A_64; klys_P52732_A_64*CrosslinkerMonoHydrolized*LYS_P52732_A_64;
  v51: LYS_P52732_A_77 + CrosslinkerMonoHydrolized => MonoHydro_P52732_A_77; klys_P52732_A_77*CrosslinkerMonoHydrolized*LYS_P52732_A_77;
  v52: LYS_P52732_A_146 + CrosslinkerMonoHydrolized => MonoHydro_P52732_A_146; klys_P52732_A_146*CrosslinkerMonoHydrolized*LYS_P52732_A_146;
  v53: LYS_P52732_A_157 + CrosslinkerMonoHydrolized => MonoHydro_P52732_A_157; klys_P52732_A_157*CrosslinkerMonoHydrolized*LYS_P52732_A_157;
  v54: LYS_P52732_A_191 + CrosslinkerMonoHydrolized => MonoHydro_P52732_A_191; klys_P52732_A_191*CrosslinkerMonoHydrolized*LYS_P52732_A_191;
  v55: LYS_P52732_A_197 + CrosslinkerMonoHydrolized => MonoHydro_P52732_A_197; klys_P52732_A_197*CrosslinkerMonoHydrolized*LYS_P52732_A_197;
  v56: LYS_P52732_A_207 + CrosslinkerMonoHydrolized => MonoHydro_P52732_A_207; klys_P52732_A_207*CrosslinkerMonoHydrolized*LYS_P52732_A_207;
  v57: LYS_P52732_A_216 + CrosslinkerMonoHydrolized => MonoHydro_P52732_A_216; klys_P52732_A_216*CrosslinkerMonoHydrolized*LYS_P52732_A_216;
  v58: LYS_P52732_A_220 + CrosslinkerMonoHydrolized => MonoHydro_P52732_A_220; klys_P52732_A_220*CrosslinkerMonoHydrolized*LYS_P52732_A_220;
  v59: LYS_P52732_A_246 + CrosslinkerMonoHydrolized => MonoHydro_P52732_A_246; klys_P52732_A_246*CrosslinkerMonoHydrolized*LYS_P52732_A_246;
  v60: LYS_P52732_A_257 + CrosslinkerMonoHydrolized => MonoHydro_P52732_A_257; klys_P52732_A_257*CrosslinkerMonoHydrolized*LYS_P52732_A_257;
  v61: LYS_P52732_A_260 + CrosslinkerMonoHydrolized => MonoHydro_P52732_A_260; klys_P52732_A_260*CrosslinkerMonoHydrolized*LYS_P52732_A_260;
  v62: LYS_P52732_A_315 + CrosslinkerMonoHydrolized => MonoHydro_P52732_A_315; klys_P52732_A_315*CrosslinkerMonoHydrolized*LYS_P52732_A_315;
  v63: LYS_P52732_A_357 + CrosslinkerMonoHydrolized => MonoHydro_P52732_A_357; klys_P52732_A_357*CrosslinkerMonoHydrolized*LYS_P52732_A_357;
  v64: LYS_P52732_A_362 + CrosslinkerMonoHydrolized => MonoHydro_P52732_A_362; klys_P52732_A_362*CrosslinkerMonoHydrolized*LYS_P52732_A_362;
  v65: LYS_P52732_A_368 + CrosslinkerMonoHydrolized => MonoHydro_P52732_A_368; klys_P52732_A_368*CrosslinkerMonoHydrolized*LYS_P52732_A_368;

  // Unit definitions:
  unit per_second = 1 / second;
  unit litre_per_mole_per_second = litre / (mole * second);
end
