// SBML level 3 version 1

model main()
  // model units - substance: mole, time: second, extent: mole

  // Compartments:
  compartment c1 = 1 litre;

  // Species:
  species Crosslinker in c1 = 0.0003065936/c1;
  species CrosslinkerMonoHydrolized in c1 = 0;
  species CrosslinkerBiHydrolized in c1 = 0;
  species LYS_P08659_A_5 in c1 = 8.175829e-6/c1;
  species LYS_P08659_A_8 in c1 = 8.175829e-6/c1;
  species LYS_P08659_A_9 in c1 = 8.175829e-6/c1;
  species LYS_P08659_A_28 in c1 = 8.175829e-6/c1;
  species LYS_P08659_A_31 in c1 = 8.175829e-6/c1;
  species LYS_P08659_A_68 in c1 = 8.175829e-6/c1;
  species LYS_P08659_A_130 in c1 = 8.175829e-6/c1;
  species LYS_P08659_A_131 in c1 = 8.175829e-6/c1;
  species LYS_P08659_A_135 in c1 = 8.175829e-6/c1;
  species LYS_P08659_A_141 in c1 = 8.175829e-6/c1;
  species LYS_P08659_A_142 in c1 = 8.175829e-6/c1;
  species LYS_P08659_A_148 in c1 = 8.175829e-6/c1;
  species LYS_P08659_A_155 in c1 = 8.175829e-6/c1;
  species LYS_P08659_A_190 in c1 = 8.175829e-6/c1;
  species LYS_P08659_A_206 in c1 = 8.175829e-6/c1;
  species LYS_P08659_A_281 in c1 = 8.175829e-6/c1;
  species LYS_P08659_A_297 in c1 = 8.175829e-6/c1;
  species LYS_P08659_A_303 in c1 = 8.175829e-6/c1;
  species LYS_P08659_A_321 in c1 = 8.175829e-6/c1;
  species LYS_P08659_A_329 in c1 = 8.175829e-6/c1;
  species LYS_P08659_A_358 in c1 = 8.175829e-6/c1;
  species LYS_P08659_A_364 in c1 = 8.175829e-6/c1;
  species LYS_P08659_A_372 in c1 = 8.175829e-6/c1;
  species LYS_P08659_A_380 in c1 = 8.175829e-6/c1;
  species LYS_P08659_A_414 in c1 = 8.175829e-6/c1;
  species LYS_P08659_A_439 in c1 = 8.175829e-6/c1;
  species LYS_P08659_A_443 in c1 = 8.175829e-6/c1;
  species LYS_P08659_A_445 in c1 = 8.175829e-6/c1;
  species LYS_P08659_A_496 in c1 = 8.175829e-6/c1;
  species LYS_P08659_A_510 in c1 = 8.175829e-6/c1;
  species LYS_P08659_A_511 in c1 = 8.175829e-6/c1;
  species LYS_P08659_A_524 in c1 = 8.175829e-6/c1;
  species LYS_P08659_A_529 in c1 = 8.175829e-6/c1;
  species LYS_P08659_A_534 in c1 = 8.175829e-6/c1;
  species LYS_P08659_A_541 in c1 = 8.175829e-6/c1;
  species LYS_P08659_B_5 in c1 = 8.175829e-6/c1;
  species LYS_P08659_B_8 in c1 = 8.175829e-6/c1;
  species LYS_P08659_B_9 in c1 = 8.175829e-6/c1;
  species LYS_P08659_B_28 in c1 = 8.175829e-6/c1;
  species LYS_P08659_B_31 in c1 = 8.175829e-6/c1;
  species LYS_P08659_B_68 in c1 = 8.175829e-6/c1;
  species LYS_P08659_B_130 in c1 = 8.175829e-6/c1;
  species LYS_P08659_B_131 in c1 = 8.175829e-6/c1;
  species LYS_P08659_B_135 in c1 = 8.175829e-6/c1;
  species LYS_P08659_B_141 in c1 = 8.175829e-6/c1;
  species LYS_P08659_B_142 in c1 = 8.175829e-6/c1;
  species LYS_P08659_B_148 in c1 = 8.175829e-6/c1;
  species LYS_P08659_B_155 in c1 = 8.175829e-6/c1;
  species LYS_P08659_B_190 in c1 = 8.175829e-6/c1;
  species LYS_P08659_B_206 in c1 = 8.175829e-6/c1;
  species LYS_P08659_B_281 in c1 = 8.175829e-6/c1;
  species LYS_P08659_B_297 in c1 = 8.175829e-6/c1;
  species LYS_P08659_B_303 in c1 = 8.175829e-6/c1;
  species LYS_P08659_B_321 in c1 = 8.175829e-6/c1;
  species LYS_P08659_B_329 in c1 = 8.175829e-6/c1;
  species LYS_P08659_B_358 in c1 = 8.175829e-6/c1;
  species LYS_P08659_B_364 in c1 = 8.175829e-6/c1;
  species LYS_P08659_B_372 in c1 = 8.175829e-6/c1;
  species LYS_P08659_B_380 in c1 = 8.175829e-6/c1;
  species LYS_P08659_B_414 in c1 = 8.175829e-6/c1;
  species LYS_P08659_B_439 in c1 = 8.175829e-6/c1;
  species LYS_P08659_B_443 in c1 = 8.175829e-6/c1;
  species LYS_P08659_B_445 in c1 = 8.175829e-6/c1;
  species LYS_P08659_B_491 in c1 = 8.175829e-6/c1;
  species LYS_P08659_B_496 in c1 = 8.175829e-6/c1;
  species LYS_P08659_B_510 in c1 = 8.175829e-6/c1;
  species LYS_P08659_B_511 in c1 = 8.175829e-6/c1;
  species LYS_P08659_B_524 in c1 = 8.175829e-6/c1;
  species LYS_P08659_B_529 in c1 = 8.175829e-6/c1;
  species LYS_P08659_B_534 in c1 = 8.175829e-6/c1;
  species LYS_P08659_B_541 in c1 = 8.175829e-6/c1;
  species LYS_P08659_B_543 in c1 = 8.175829e-6/c1;
  species LYS_P08659_B_544 in c1 = 8.175829e-6/c1;
  species LYS_P08659_B_547 in c1 = 8.175829e-6/c1;
  species LYS_P08659_B_549 in c1 = 8.175829e-6/c1;
  species Mono_P08659_A_5 in c1 = 0;
  species Mono_P08659_A_8 in c1 = 0;
  species Mono_P08659_A_9 in c1 = 0;
  species Mono_P08659_A_28 in c1 = 0;
  species Mono_P08659_A_31 in c1 = 0;
  species Mono_P08659_A_68 in c1 = 0;
  species Mono_P08659_A_130 in c1 = 0;
  species Mono_P08659_A_131 in c1 = 0;
  species Mono_P08659_A_135 in c1 = 0;
  species Mono_P08659_A_141 in c1 = 0;
  species Mono_P08659_A_142 in c1 = 0;
  species Mono_P08659_A_148 in c1 = 0;
  species Mono_P08659_A_155 in c1 = 0;
  species Mono_P08659_A_190 in c1 = 0;
  species Mono_P08659_A_206 in c1 = 0;
  species Mono_P08659_A_281 in c1 = 0;
  species Mono_P08659_A_297 in c1 = 0;
  species Mono_P08659_A_303 in c1 = 0;
  species Mono_P08659_A_321 in c1 = 0;
  species Mono_P08659_A_329 in c1 = 0;
  species Mono_P08659_A_358 in c1 = 0;
  species Mono_P08659_A_364 in c1 = 0;
  species Mono_P08659_A_372 in c1 = 0;
  species Mono_P08659_A_380 in c1 = 0;
  species Mono_P08659_A_414 in c1 = 0;
  species Mono_P08659_A_439 in c1 = 0;
  species Mono_P08659_A_443 in c1 = 0;
  species Mono_P08659_A_445 in c1 = 0;
  species Mono_P08659_A_496 in c1 = 0;
  species Mono_P08659_A_510 in c1 = 0;
  species Mono_P08659_A_511 in c1 = 0;
  species Mono_P08659_A_524 in c1 = 0;
  species Mono_P08659_A_529 in c1 = 0;
  species Mono_P08659_A_534 in c1 = 0;
  species Mono_P08659_A_541 in c1 = 0;
  species Mono_P08659_B_5 in c1 = 0;
  species Mono_P08659_B_8 in c1 = 0;
  species Mono_P08659_B_9 in c1 = 0;
  species Mono_P08659_B_28 in c1 = 0;
  species Mono_P08659_B_31 in c1 = 0;
  species Mono_P08659_B_68 in c1 = 0;
  species Mono_P08659_B_130 in c1 = 0;
  species Mono_P08659_B_131 in c1 = 0;
  species Mono_P08659_B_135 in c1 = 0;
  species Mono_P08659_B_141 in c1 = 0;
  species Mono_P08659_B_142 in c1 = 0;
  species Mono_P08659_B_148 in c1 = 0;
  species Mono_P08659_B_155 in c1 = 0;
  species Mono_P08659_B_190 in c1 = 0;
  species Mono_P08659_B_206 in c1 = 0;
  species Mono_P08659_B_281 in c1 = 0;
  species Mono_P08659_B_297 in c1 = 0;
  species Mono_P08659_B_303 in c1 = 0;
  species Mono_P08659_B_321 in c1 = 0;
  species Mono_P08659_B_329 in c1 = 0;
  species Mono_P08659_B_358 in c1 = 0;
  species Mono_P08659_B_364 in c1 = 0;
  species Mono_P08659_B_372 in c1 = 0;
  species Mono_P08659_B_380 in c1 = 0;
  species Mono_P08659_B_414 in c1 = 0;
  species Mono_P08659_B_439 in c1 = 0;
  species Mono_P08659_B_443 in c1 = 0;
  species Mono_P08659_B_445 in c1 = 0;
  species Mono_P08659_B_491 in c1 = 0;
  species Mono_P08659_B_496 in c1 = 0;
  species Mono_P08659_B_510 in c1 = 0;
  species Mono_P08659_B_511 in c1 = 0;
  species Mono_P08659_B_524 in c1 = 0;
  species Mono_P08659_B_529 in c1 = 0;
  species Mono_P08659_B_534 in c1 = 0;
  species Mono_P08659_B_541 in c1 = 0;
  species Mono_P08659_B_543 in c1 = 0;
  species Mono_P08659_B_544 in c1 = 0;
  species Mono_P08659_B_547 in c1 = 0;
  species Mono_P08659_B_549 in c1 = 0;
  species MonoHydro_P08659_A_5 in c1 = 0;
  species MonoHydro_P08659_A_8 in c1 = 0;
  species MonoHydro_P08659_A_9 in c1 = 0;
  species MonoHydro_P08659_A_28 in c1 = 0;
  species MonoHydro_P08659_A_31 in c1 = 0;
  species MonoHydro_P08659_A_68 in c1 = 0;
  species MonoHydro_P08659_A_130 in c1 = 0;
  species MonoHydro_P08659_A_131 in c1 = 0;
  species MonoHydro_P08659_A_135 in c1 = 0;
  species MonoHydro_P08659_A_141 in c1 = 0;
  species MonoHydro_P08659_A_142 in c1 = 0;
  species MonoHydro_P08659_A_148 in c1 = 0;
  species MonoHydro_P08659_A_155 in c1 = 0;
  species MonoHydro_P08659_A_190 in c1 = 0;
  species MonoHydro_P08659_A_206 in c1 = 0;
  species MonoHydro_P08659_A_281 in c1 = 0;
  species MonoHydro_P08659_A_297 in c1 = 0;
  species MonoHydro_P08659_A_303 in c1 = 0;
  species MonoHydro_P08659_A_321 in c1 = 0;
  species MonoHydro_P08659_A_329 in c1 = 0;
  species MonoHydro_P08659_A_358 in c1 = 0;
  species MonoHydro_P08659_A_364 in c1 = 0;
  species MonoHydro_P08659_A_372 in c1 = 0;
  species MonoHydro_P08659_A_380 in c1 = 0;
  species MonoHydro_P08659_A_414 in c1 = 0;
  species MonoHydro_P08659_A_439 in c1 = 0;
  species MonoHydro_P08659_A_443 in c1 = 0;
  species MonoHydro_P08659_A_445 in c1 = 0;
  species MonoHydro_P08659_A_496 in c1 = 0;
  species MonoHydro_P08659_A_510 in c1 = 0;
  species MonoHydro_P08659_A_511 in c1 = 0;
  species MonoHydro_P08659_A_524 in c1 = 0;
  species MonoHydro_P08659_A_529 in c1 = 0;
  species MonoHydro_P08659_A_534 in c1 = 0;
  species MonoHydro_P08659_A_541 in c1 = 0;
  species MonoHydro_P08659_B_5 in c1 = 0;
  species MonoHydro_P08659_B_8 in c1 = 0;
  species MonoHydro_P08659_B_9 in c1 = 0;
  species MonoHydro_P08659_B_28 in c1 = 0;
  species MonoHydro_P08659_B_31 in c1 = 0;
  species MonoHydro_P08659_B_68 in c1 = 0;
  species MonoHydro_P08659_B_130 in c1 = 0;
  species MonoHydro_P08659_B_131 in c1 = 0;
  species MonoHydro_P08659_B_135 in c1 = 0;
  species MonoHydro_P08659_B_141 in c1 = 0;
  species MonoHydro_P08659_B_142 in c1 = 0;
  species MonoHydro_P08659_B_148 in c1 = 0;
  species MonoHydro_P08659_B_155 in c1 = 0;
  species MonoHydro_P08659_B_190 in c1 = 0;
  species MonoHydro_P08659_B_206 in c1 = 0;
  species MonoHydro_P08659_B_281 in c1 = 0;
  species MonoHydro_P08659_B_297 in c1 = 0;
  species MonoHydro_P08659_B_303 in c1 = 0;
  species MonoHydro_P08659_B_321 in c1 = 0;
  species MonoHydro_P08659_B_329 in c1 = 0;
  species MonoHydro_P08659_B_358 in c1 = 0;
  species MonoHydro_P08659_B_364 in c1 = 0;
  species MonoHydro_P08659_B_372 in c1 = 0;
  species MonoHydro_P08659_B_380 in c1 = 0;
  species MonoHydro_P08659_B_414 in c1 = 0;
  species MonoHydro_P08659_B_439 in c1 = 0;
  species MonoHydro_P08659_B_443 in c1 = 0;
  species MonoHydro_P08659_B_445 in c1 = 0;
  species MonoHydro_P08659_B_491 in c1 = 0;
  species MonoHydro_P08659_B_496 in c1 = 0;
  species MonoHydro_P08659_B_510 in c1 = 0;
  species MonoHydro_P08659_B_511 in c1 = 0;
  species MonoHydro_P08659_B_524 in c1 = 0;
  species MonoHydro_P08659_B_529 in c1 = 0;
  species MonoHydro_P08659_B_534 in c1 = 0;
  species MonoHydro_P08659_B_541 in c1 = 0;
  species MonoHydro_P08659_B_543 in c1 = 0;
  species MonoHydro_P08659_B_544 in c1 = 0;
  species MonoHydro_P08659_B_547 in c1 = 0;
  species MonoHydro_P08659_B_549 in c1 = 0;

  // Parameters:
  kh = 2.5e-5 per_second;
  kon = 10000000 litre_per_mole_per_second;
  koff = 1000000000 per_second;
  MolecularWeight = 122311.8 per_second;
  NumLys = 75 per_second;
  pH = 7 per_second;
  klys_P08659_A_5 = 0.3107924 per_second;
  klys_P08659_A_8 = 0.01153433 per_second;
  klys_P08659_A_9 = 0.2533832 per_second;
  klys_P08659_A_28 = 0.4017028 per_second;
  klys_P08659_A_31 = 0.189674 per_second;
  klys_P08659_A_68 = 0.1865785 per_second;
  klys_P08659_A_130 = 0.2352591 per_second;
  klys_P08659_A_131 = 0.280346 per_second;
  klys_P08659_A_135 = 0.1340411 per_second;
  klys_P08659_A_141 = 0.3442816 per_second;
  klys_P08659_A_142 = 0.4613618 per_second;
  klys_P08659_A_148 = 0.114068 per_second;
  klys_P08659_A_155 = 0.6258905 per_second;
  klys_P08659_A_190 = 0.4871545 per_second;
  klys_P08659_A_206 = 0.1829567 per_second;
  klys_P08659_A_281 = 0.3058413 per_second;
  klys_P08659_A_297 = 0.348775 per_second;
  klys_P08659_A_303 = 0.3363673 per_second;
  klys_P08659_A_321 = 0.2364995 per_second;
  klys_P08659_A_329 = 0.2823987 per_second;
  klys_P08659_A_358 = 0.1112512 per_second;
  klys_P08659_A_364 = 0.06847774 per_second;
  klys_P08659_A_372 = 0.058296 per_second;
  klys_P08659_A_380 = 0.4891787 per_second;
  klys_P08659_A_414 = 0.4272991 per_second;
  klys_P08659_A_439 = 0.3965841 per_second;
  klys_P08659_A_443 = 0.2776629 per_second;
  klys_P08659_A_445 = 0.3415523 per_second;
  klys_P08659_A_496 = 0.232879 per_second;
  klys_P08659_A_510 = 0.154516 per_second;
  klys_P08659_A_511 = 0.14654 per_second;
  klys_P08659_A_524 = 0.2486723 per_second;
  klys_P08659_A_529 = 0.3238419 per_second;
  klys_P08659_A_534 = 0.1692549 per_second;
  klys_P08659_A_541 = 0.4756913 per_second;
  klys_P08659_B_5 = 0.4350284 per_second;
  klys_P08659_B_8 = 0.007005095 per_second;
  klys_P08659_B_9 = 0.3157448 per_second;
  klys_P08659_B_28 = 0.2116978 per_second;
  klys_P08659_B_31 = 0.1199058 per_second;
  klys_P08659_B_68 = 0.175171 per_second;
  klys_P08659_B_130 = 0.2528356 per_second;
  klys_P08659_B_131 = 0.2613854 per_second;
  klys_P08659_B_135 = 0.1213135 per_second;
  klys_P08659_B_141 = 0.3280108 per_second;
  klys_P08659_B_142 = 0.5088517 per_second;
  klys_P08659_B_148 = 0.1072545 per_second;
  klys_P08659_B_155 = 0.4316755 per_second;
  klys_P08659_B_190 = 0.5448968 per_second;
  klys_P08659_B_206 = 0.08976042 per_second;
  klys_P08659_B_281 = 0.345391 per_second;
  klys_P08659_B_297 = 0.3346431 per_second;
  klys_P08659_B_303 = 0.3518257 per_second;
  klys_P08659_B_321 = 0.2637237 per_second;
  klys_P08659_B_329 = 0.2941624 per_second;
  klys_P08659_B_358 = 0.1039103 per_second;
  klys_P08659_B_364 = 0.08341226 per_second;
  klys_P08659_B_372 = 0.07898863 per_second;
  klys_P08659_B_380 = 0.4701232 per_second;
  klys_P08659_B_414 = 0.3985102 per_second;
  klys_P08659_B_439 = 0.3634319 per_second;
  klys_P08659_B_443 = 0.2280016 per_second;
  klys_P08659_B_445 = 0.325416 per_second;
  klys_P08659_B_491 = 0.1786532 per_second;
  klys_P08659_B_496 = 0.2517446 per_second;
  klys_P08659_B_510 = 0.6779808 per_second;
  klys_P08659_B_511 = 0.1077697 per_second;
  klys_P08659_B_524 = 0.226401 per_second;
  klys_P08659_B_529 = 0.2697892 per_second;
  klys_P08659_B_534 = 0.3505939 per_second;
  klys_P08659_B_541 = 0.3754737 per_second;
  klys_P08659_B_543 = 0.2268147 per_second;
  klys_P08659_B_544 = 0.2735535 per_second;
  klys_P08659_B_547 = 0.3291826 per_second;
  klys_P08659_B_549 = 0.2497742 per_second;

  // Reactions:
  v1: Crosslinker => CrosslinkerMonoHydrolized; kh*Crosslinker;
  v2: CrosslinkerMonoHydrolized => CrosslinkerBiHydrolized; kh*CrosslinkerMonoHydrolized;
  v3: LYS_P08659_A_5 + Crosslinker => Mono_P08659_A_5; klys_P08659_A_5*Crosslinker*LYS_P08659_A_5;
  v4: LYS_P08659_A_8 + Crosslinker => Mono_P08659_A_8; klys_P08659_A_8*Crosslinker*LYS_P08659_A_8;
  v5: LYS_P08659_A_9 + Crosslinker => Mono_P08659_A_9; klys_P08659_A_9*Crosslinker*LYS_P08659_A_9;
  v6: LYS_P08659_A_28 + Crosslinker => Mono_P08659_A_28; klys_P08659_A_28*Crosslinker*LYS_P08659_A_28;
  v7: LYS_P08659_A_31 + Crosslinker => Mono_P08659_A_31; klys_P08659_A_31*Crosslinker*LYS_P08659_A_31;
  v8: LYS_P08659_A_68 + Crosslinker => Mono_P08659_A_68; klys_P08659_A_68*Crosslinker*LYS_P08659_A_68;
  v9: LYS_P08659_A_130 + Crosslinker => Mono_P08659_A_130; klys_P08659_A_130*Crosslinker*LYS_P08659_A_130;
  v10: LYS_P08659_A_131 + Crosslinker => Mono_P08659_A_131; klys_P08659_A_131*Crosslinker*LYS_P08659_A_131;
  v11: LYS_P08659_A_135 + Crosslinker => Mono_P08659_A_135; klys_P08659_A_135*Crosslinker*LYS_P08659_A_135;
  v12: LYS_P08659_A_141 + Crosslinker => Mono_P08659_A_141; klys_P08659_A_141*Crosslinker*LYS_P08659_A_141;
  v13: LYS_P08659_A_142 + Crosslinker => Mono_P08659_A_142; klys_P08659_A_142*Crosslinker*LYS_P08659_A_142;
  v14: LYS_P08659_A_148 + Crosslinker => Mono_P08659_A_148; klys_P08659_A_148*Crosslinker*LYS_P08659_A_148;
  v15: LYS_P08659_A_155 + Crosslinker => Mono_P08659_A_155; klys_P08659_A_155*Crosslinker*LYS_P08659_A_155;
  v16: LYS_P08659_A_190 + Crosslinker => Mono_P08659_A_190; klys_P08659_A_190*Crosslinker*LYS_P08659_A_190;
  v17: LYS_P08659_A_206 + Crosslinker => Mono_P08659_A_206; klys_P08659_A_206*Crosslinker*LYS_P08659_A_206;
  v18: LYS_P08659_A_281 + Crosslinker => Mono_P08659_A_281; klys_P08659_A_281*Crosslinker*LYS_P08659_A_281;
  v19: LYS_P08659_A_297 + Crosslinker => Mono_P08659_A_297; klys_P08659_A_297*Crosslinker*LYS_P08659_A_297;
  v20: LYS_P08659_A_303 + Crosslinker => Mono_P08659_A_303; klys_P08659_A_303*Crosslinker*LYS_P08659_A_303;
  v21: LYS_P08659_A_321 + Crosslinker => Mono_P08659_A_321; klys_P08659_A_321*Crosslinker*LYS_P08659_A_321;
  v22: LYS_P08659_A_329 + Crosslinker => Mono_P08659_A_329; klys_P08659_A_329*Crosslinker*LYS_P08659_A_329;
  v23: LYS_P08659_A_358 + Crosslinker => Mono_P08659_A_358; klys_P08659_A_358*Crosslinker*LYS_P08659_A_358;
  v24: LYS_P08659_A_364 + Crosslinker => Mono_P08659_A_364; klys_P08659_A_364*Crosslinker*LYS_P08659_A_364;
  v25: LYS_P08659_A_372 + Crosslinker => Mono_P08659_A_372; klys_P08659_A_372*Crosslinker*LYS_P08659_A_372;
  v26: LYS_P08659_A_380 + Crosslinker => Mono_P08659_A_380; klys_P08659_A_380*Crosslinker*LYS_P08659_A_380;
  v27: LYS_P08659_A_414 + Crosslinker => Mono_P08659_A_414; klys_P08659_A_414*Crosslinker*LYS_P08659_A_414;
  v28: LYS_P08659_A_439 + Crosslinker => Mono_P08659_A_439; klys_P08659_A_439*Crosslinker*LYS_P08659_A_439;
  v29: LYS_P08659_A_443 + Crosslinker => Mono_P08659_A_443; klys_P08659_A_443*Crosslinker*LYS_P08659_A_443;
  v30: LYS_P08659_A_445 + Crosslinker => Mono_P08659_A_445; klys_P08659_A_445*Crosslinker*LYS_P08659_A_445;
  v31: LYS_P08659_A_496 + Crosslinker => Mono_P08659_A_496; klys_P08659_A_496*Crosslinker*LYS_P08659_A_496;
  v32: LYS_P08659_A_510 + Crosslinker => Mono_P08659_A_510; klys_P08659_A_510*Crosslinker*LYS_P08659_A_510;
  v33: LYS_P08659_A_511 + Crosslinker => Mono_P08659_A_511; klys_P08659_A_511*Crosslinker*LYS_P08659_A_511;
  v34: LYS_P08659_A_524 + Crosslinker => Mono_P08659_A_524; klys_P08659_A_524*Crosslinker*LYS_P08659_A_524;
  v35: LYS_P08659_A_529 + Crosslinker => Mono_P08659_A_529; klys_P08659_A_529*Crosslinker*LYS_P08659_A_529;
  v36: LYS_P08659_A_534 + Crosslinker => Mono_P08659_A_534; klys_P08659_A_534*Crosslinker*LYS_P08659_A_534;
  v37: LYS_P08659_A_541 + Crosslinker => Mono_P08659_A_541; klys_P08659_A_541*Crosslinker*LYS_P08659_A_541;
  v38: LYS_P08659_B_5 + Crosslinker => Mono_P08659_B_5; klys_P08659_B_5*Crosslinker*LYS_P08659_B_5;
  v39: LYS_P08659_B_8 + Crosslinker => Mono_P08659_B_8; klys_P08659_B_8*Crosslinker*LYS_P08659_B_8;
  v40: LYS_P08659_B_9 + Crosslinker => Mono_P08659_B_9; klys_P08659_B_9*Crosslinker*LYS_P08659_B_9;
  v41: LYS_P08659_B_28 + Crosslinker => Mono_P08659_B_28; klys_P08659_B_28*Crosslinker*LYS_P08659_B_28;
  v42: LYS_P08659_B_31 + Crosslinker => Mono_P08659_B_31; klys_P08659_B_31*Crosslinker*LYS_P08659_B_31;
  v43: LYS_P08659_B_68 + Crosslinker => Mono_P08659_B_68; klys_P08659_B_68*Crosslinker*LYS_P08659_B_68;
  v44: LYS_P08659_B_130 + Crosslinker => Mono_P08659_B_130; klys_P08659_B_130*Crosslinker*LYS_P08659_B_130;
  v45: LYS_P08659_B_131 + Crosslinker => Mono_P08659_B_131; klys_P08659_B_131*Crosslinker*LYS_P08659_B_131;
  v46: LYS_P08659_B_135 + Crosslinker => Mono_P08659_B_135; klys_P08659_B_135*Crosslinker*LYS_P08659_B_135;
  v47: LYS_P08659_B_141 + Crosslinker => Mono_P08659_B_141; klys_P08659_B_141*Crosslinker*LYS_P08659_B_141;
  v48: LYS_P08659_B_142 + Crosslinker => Mono_P08659_B_142; klys_P08659_B_142*Crosslinker*LYS_P08659_B_142;
  v49: LYS_P08659_B_148 + Crosslinker => Mono_P08659_B_148; klys_P08659_B_148*Crosslinker*LYS_P08659_B_148;
  v50: LYS_P08659_B_155 + Crosslinker => Mono_P08659_B_155; klys_P08659_B_155*Crosslinker*LYS_P08659_B_155;
  v51: LYS_P08659_B_190 + Crosslinker => Mono_P08659_B_190; klys_P08659_B_190*Crosslinker*LYS_P08659_B_190;
  v52: LYS_P08659_B_206 + Crosslinker => Mono_P08659_B_206; klys_P08659_B_206*Crosslinker*LYS_P08659_B_206;
  v53: LYS_P08659_B_281 + Crosslinker => Mono_P08659_B_281; klys_P08659_B_281*Crosslinker*LYS_P08659_B_281;
  v54: LYS_P08659_B_297 + Crosslinker => Mono_P08659_B_297; klys_P08659_B_297*Crosslinker*LYS_P08659_B_297;
  v55: LYS_P08659_B_303 + Crosslinker => Mono_P08659_B_303; klys_P08659_B_303*Crosslinker*LYS_P08659_B_303;
  v56: LYS_P08659_B_321 + Crosslinker => Mono_P08659_B_321; klys_P08659_B_321*Crosslinker*LYS_P08659_B_321;
  v57: LYS_P08659_B_329 + Crosslinker => Mono_P08659_B_329; klys_P08659_B_329*Crosslinker*LYS_P08659_B_329;
  v58: LYS_P08659_B_358 + Crosslinker => Mono_P08659_B_358; klys_P08659_B_358*Crosslinker*LYS_P08659_B_358;
  v59: LYS_P08659_B_364 + Crosslinker => Mono_P08659_B_364; klys_P08659_B_364*Crosslinker*LYS_P08659_B_364;
  v60: LYS_P08659_B_372 + Crosslinker => Mono_P08659_B_372; klys_P08659_B_372*Crosslinker*LYS_P08659_B_372;
  v61: LYS_P08659_B_380 + Crosslinker => Mono_P08659_B_380; klys_P08659_B_380*Crosslinker*LYS_P08659_B_380;
  v62: LYS_P08659_B_414 + Crosslinker => Mono_P08659_B_414; klys_P08659_B_414*Crosslinker*LYS_P08659_B_414;
  v63: LYS_P08659_B_439 + Crosslinker => Mono_P08659_B_439; klys_P08659_B_439*Crosslinker*LYS_P08659_B_439;
  v64: LYS_P08659_B_443 + Crosslinker => Mono_P08659_B_443; klys_P08659_B_443*Crosslinker*LYS_P08659_B_443;
  v65: LYS_P08659_B_445 + Crosslinker => Mono_P08659_B_445; klys_P08659_B_445*Crosslinker*LYS_P08659_B_445;
  v66: LYS_P08659_B_491 + Crosslinker => Mono_P08659_B_491; klys_P08659_B_491*Crosslinker*LYS_P08659_B_491;
  v67: LYS_P08659_B_496 + Crosslinker => Mono_P08659_B_496; klys_P08659_B_496*Crosslinker*LYS_P08659_B_496;
  v68: LYS_P08659_B_510 + Crosslinker => Mono_P08659_B_510; klys_P08659_B_510*Crosslinker*LYS_P08659_B_510;
  v69: LYS_P08659_B_511 + Crosslinker => Mono_P08659_B_511; klys_P08659_B_511*Crosslinker*LYS_P08659_B_511;
  v70: LYS_P08659_B_524 + Crosslinker => Mono_P08659_B_524; klys_P08659_B_524*Crosslinker*LYS_P08659_B_524;
  v71: LYS_P08659_B_529 + Crosslinker => Mono_P08659_B_529; klys_P08659_B_529*Crosslinker*LYS_P08659_B_529;
  v72: LYS_P08659_B_534 + Crosslinker => Mono_P08659_B_534; klys_P08659_B_534*Crosslinker*LYS_P08659_B_534;
  v73: LYS_P08659_B_541 + Crosslinker => Mono_P08659_B_541; klys_P08659_B_541*Crosslinker*LYS_P08659_B_541;
  v74: LYS_P08659_B_543 + Crosslinker => Mono_P08659_B_543; klys_P08659_B_543*Crosslinker*LYS_P08659_B_543;
  v75: LYS_P08659_B_544 + Crosslinker => Mono_P08659_B_544; klys_P08659_B_544*Crosslinker*LYS_P08659_B_544;
  v76: LYS_P08659_B_547 + Crosslinker => Mono_P08659_B_547; klys_P08659_B_547*Crosslinker*LYS_P08659_B_547;
  v77: LYS_P08659_B_549 + Crosslinker => Mono_P08659_B_549; klys_P08659_B_549*Crosslinker*LYS_P08659_B_549;
  v78: Mono_P08659_A_5 => MonoHydro_P08659_A_5; kh*Mono_P08659_A_5;
  v79: Mono_P08659_A_8 => MonoHydro_P08659_A_8; kh*Mono_P08659_A_8;
  v80: Mono_P08659_A_9 => MonoHydro_P08659_A_9; kh*Mono_P08659_A_9;
  v81: Mono_P08659_A_28 => MonoHydro_P08659_A_28; kh*Mono_P08659_A_28;
  v82: Mono_P08659_A_31 => MonoHydro_P08659_A_31; kh*Mono_P08659_A_31;
  v83: Mono_P08659_A_68 => MonoHydro_P08659_A_68; kh*Mono_P08659_A_68;
  v84: Mono_P08659_A_130 => MonoHydro_P08659_A_130; kh*Mono_P08659_A_130;
  v85: Mono_P08659_A_131 => MonoHydro_P08659_A_131; kh*Mono_P08659_A_131;
  v86: Mono_P08659_A_135 => MonoHydro_P08659_A_135; kh*Mono_P08659_A_135;
  v87: Mono_P08659_A_141 => MonoHydro_P08659_A_141; kh*Mono_P08659_A_141;
  v88: Mono_P08659_A_142 => MonoHydro_P08659_A_142; kh*Mono_P08659_A_142;
  v89: Mono_P08659_A_148 => MonoHydro_P08659_A_148; kh*Mono_P08659_A_148;
  v90: Mono_P08659_A_155 => MonoHydro_P08659_A_155; kh*Mono_P08659_A_155;
  v91: Mono_P08659_A_190 => MonoHydro_P08659_A_190; kh*Mono_P08659_A_190;
  v92: Mono_P08659_A_206 => MonoHydro_P08659_A_206; kh*Mono_P08659_A_206;
  v93: Mono_P08659_A_281 => MonoHydro_P08659_A_281; kh*Mono_P08659_A_281;
  v94: Mono_P08659_A_297 => MonoHydro_P08659_A_297; kh*Mono_P08659_A_297;
  v95: Mono_P08659_A_303 => MonoHydro_P08659_A_303; kh*Mono_P08659_A_303;
  v96: Mono_P08659_A_321 => MonoHydro_P08659_A_321; kh*Mono_P08659_A_321;
  v97: Mono_P08659_A_329 => MonoHydro_P08659_A_329; kh*Mono_P08659_A_329;
  v98: Mono_P08659_A_358 => MonoHydro_P08659_A_358; kh*Mono_P08659_A_358;
  v99: Mono_P08659_A_364 => MonoHydro_P08659_A_364; kh*Mono_P08659_A_364;
  v100: Mono_P08659_A_372 => MonoHydro_P08659_A_372; kh*Mono_P08659_A_372;
  v101: Mono_P08659_A_380 => MonoHydro_P08659_A_380; kh*Mono_P08659_A_380;
  v102: Mono_P08659_A_414 => MonoHydro_P08659_A_414; kh*Mono_P08659_A_414;
  v103: Mono_P08659_A_439 => MonoHydro_P08659_A_439; kh*Mono_P08659_A_439;
  v104: Mono_P08659_A_443 => MonoHydro_P08659_A_443; kh*Mono_P08659_A_443;
  v105: Mono_P08659_A_445 => MonoHydro_P08659_A_445; kh*Mono_P08659_A_445;
  v106: Mono_P08659_A_496 => MonoHydro_P08659_A_496; kh*Mono_P08659_A_496;
  v107: Mono_P08659_A_510 => MonoHydro_P08659_A_510; kh*Mono_P08659_A_510;
  v108: Mono_P08659_A_511 => MonoHydro_P08659_A_511; kh*Mono_P08659_A_511;
  v109: Mono_P08659_A_524 => MonoHydro_P08659_A_524; kh*Mono_P08659_A_524;
  v110: Mono_P08659_A_529 => MonoHydro_P08659_A_529; kh*Mono_P08659_A_529;
  v111: Mono_P08659_A_534 => MonoHydro_P08659_A_534; kh*Mono_P08659_A_534;
  v112: Mono_P08659_A_541 => MonoHydro_P08659_A_541; kh*Mono_P08659_A_541;
  v113: Mono_P08659_B_5 => MonoHydro_P08659_B_5; kh*Mono_P08659_B_5;
  v114: Mono_P08659_B_8 => MonoHydro_P08659_B_8; kh*Mono_P08659_B_8;
  v115: Mono_P08659_B_9 => MonoHydro_P08659_B_9; kh*Mono_P08659_B_9;
  v116: Mono_P08659_B_28 => MonoHydro_P08659_B_28; kh*Mono_P08659_B_28;
  v117: Mono_P08659_B_31 => MonoHydro_P08659_B_31; kh*Mono_P08659_B_31;
  v118: Mono_P08659_B_68 => MonoHydro_P08659_B_68; kh*Mono_P08659_B_68;
  v119: Mono_P08659_B_130 => MonoHydro_P08659_B_130; kh*Mono_P08659_B_130;
  v120: Mono_P08659_B_131 => MonoHydro_P08659_B_131; kh*Mono_P08659_B_131;
  v121: Mono_P08659_B_135 => MonoHydro_P08659_B_135; kh*Mono_P08659_B_135;
  v122: Mono_P08659_B_141 => MonoHydro_P08659_B_141; kh*Mono_P08659_B_141;
  v123: Mono_P08659_B_142 => MonoHydro_P08659_B_142; kh*Mono_P08659_B_142;
  v124: Mono_P08659_B_148 => MonoHydro_P08659_B_148; kh*Mono_P08659_B_148;
  v125: Mono_P08659_B_155 => MonoHydro_P08659_B_155; kh*Mono_P08659_B_155;
  v126: Mono_P08659_B_190 => MonoHydro_P08659_B_190; kh*Mono_P08659_B_190;
  v127: Mono_P08659_B_206 => MonoHydro_P08659_B_206; kh*Mono_P08659_B_206;
  v128: Mono_P08659_B_281 => MonoHydro_P08659_B_281; kh*Mono_P08659_B_281;
  v129: Mono_P08659_B_297 => MonoHydro_P08659_B_297; kh*Mono_P08659_B_297;
  v130: Mono_P08659_B_303 => MonoHydro_P08659_B_303; kh*Mono_P08659_B_303;
  v131: Mono_P08659_B_321 => MonoHydro_P08659_B_321; kh*Mono_P08659_B_321;
  v132: Mono_P08659_B_329 => MonoHydro_P08659_B_329; kh*Mono_P08659_B_329;
  v133: Mono_P08659_B_358 => MonoHydro_P08659_B_358; kh*Mono_P08659_B_358;
  v134: Mono_P08659_B_364 => MonoHydro_P08659_B_364; kh*Mono_P08659_B_364;
  v135: Mono_P08659_B_372 => MonoHydro_P08659_B_372; kh*Mono_P08659_B_372;
  v136: Mono_P08659_B_380 => MonoHydro_P08659_B_380; kh*Mono_P08659_B_380;
  v137: Mono_P08659_B_414 => MonoHydro_P08659_B_414; kh*Mono_P08659_B_414;
  v138: Mono_P08659_B_439 => MonoHydro_P08659_B_439; kh*Mono_P08659_B_439;
  v139: Mono_P08659_B_443 => MonoHydro_P08659_B_443; kh*Mono_P08659_B_443;
  v140: Mono_P08659_B_445 => MonoHydro_P08659_B_445; kh*Mono_P08659_B_445;
  v141: Mono_P08659_B_491 => MonoHydro_P08659_B_491; kh*Mono_P08659_B_491;
  v142: Mono_P08659_B_496 => MonoHydro_P08659_B_496; kh*Mono_P08659_B_496;
  v143: Mono_P08659_B_510 => MonoHydro_P08659_B_510; kh*Mono_P08659_B_510;
  v144: Mono_P08659_B_511 => MonoHydro_P08659_B_511; kh*Mono_P08659_B_511;
  v145: Mono_P08659_B_524 => MonoHydro_P08659_B_524; kh*Mono_P08659_B_524;
  v146: Mono_P08659_B_529 => MonoHydro_P08659_B_529; kh*Mono_P08659_B_529;
  v147: Mono_P08659_B_534 => MonoHydro_P08659_B_534; kh*Mono_P08659_B_534;
  v148: Mono_P08659_B_541 => MonoHydro_P08659_B_541; kh*Mono_P08659_B_541;
  v149: Mono_P08659_B_543 => MonoHydro_P08659_B_543; kh*Mono_P08659_B_543;
  v150: Mono_P08659_B_544 => MonoHydro_P08659_B_544; kh*Mono_P08659_B_544;
  v151: Mono_P08659_B_547 => MonoHydro_P08659_B_547; kh*Mono_P08659_B_547;
  v152: Mono_P08659_B_549 => MonoHydro_P08659_B_549; kh*Mono_P08659_B_549;
  v153: LYS_P08659_A_5 + CrosslinkerMonoHydrolized => MonoHydro_P08659_A_5; klys_P08659_A_5*CrosslinkerMonoHydrolized*LYS_P08659_A_5;
  v154: LYS_P08659_A_8 + CrosslinkerMonoHydrolized => MonoHydro_P08659_A_8; klys_P08659_A_8*CrosslinkerMonoHydrolized*LYS_P08659_A_8;
  v155: LYS_P08659_A_9 + CrosslinkerMonoHydrolized => MonoHydro_P08659_A_9; klys_P08659_A_9*CrosslinkerMonoHydrolized*LYS_P08659_A_9;
  v156: LYS_P08659_A_28 + CrosslinkerMonoHydrolized => MonoHydro_P08659_A_28; klys_P08659_A_28*CrosslinkerMonoHydrolized*LYS_P08659_A_28;
  v157: LYS_P08659_A_31 + CrosslinkerMonoHydrolized => MonoHydro_P08659_A_31; klys_P08659_A_31*CrosslinkerMonoHydrolized*LYS_P08659_A_31;
  v158: LYS_P08659_A_68 + CrosslinkerMonoHydrolized => MonoHydro_P08659_A_68; klys_P08659_A_68*CrosslinkerMonoHydrolized*LYS_P08659_A_68;
  v159: LYS_P08659_A_130 + CrosslinkerMonoHydrolized => MonoHydro_P08659_A_130; klys_P08659_A_130*CrosslinkerMonoHydrolized*LYS_P08659_A_130;
  v160: LYS_P08659_A_131 + CrosslinkerMonoHydrolized => MonoHydro_P08659_A_131; klys_P08659_A_131*CrosslinkerMonoHydrolized*LYS_P08659_A_131;
  v161: LYS_P08659_A_135 + CrosslinkerMonoHydrolized => MonoHydro_P08659_A_135; klys_P08659_A_135*CrosslinkerMonoHydrolized*LYS_P08659_A_135;
  v162: LYS_P08659_A_141 + CrosslinkerMonoHydrolized => MonoHydro_P08659_A_141; klys_P08659_A_141*CrosslinkerMonoHydrolized*LYS_P08659_A_141;
  v163: LYS_P08659_A_142 + CrosslinkerMonoHydrolized => MonoHydro_P08659_A_142; klys_P08659_A_142*CrosslinkerMonoHydrolized*LYS_P08659_A_142;
  v164: LYS_P08659_A_148 + CrosslinkerMonoHydrolized => MonoHydro_P08659_A_148; klys_P08659_A_148*CrosslinkerMonoHydrolized*LYS_P08659_A_148;
  v165: LYS_P08659_A_155 + CrosslinkerMonoHydrolized => MonoHydro_P08659_A_155; klys_P08659_A_155*CrosslinkerMonoHydrolized*LYS_P08659_A_155;
  v166: LYS_P08659_A_190 + CrosslinkerMonoHydrolized => MonoHydro_P08659_A_190; klys_P08659_A_190*CrosslinkerMonoHydrolized*LYS_P08659_A_190;
  v167: LYS_P08659_A_206 + CrosslinkerMonoHydrolized => MonoHydro_P08659_A_206; klys_P08659_A_206*CrosslinkerMonoHydrolized*LYS_P08659_A_206;
  v168: LYS_P08659_A_281 + CrosslinkerMonoHydrolized => MonoHydro_P08659_A_281; klys_P08659_A_281*CrosslinkerMonoHydrolized*LYS_P08659_A_281;
  v169: LYS_P08659_A_297 + CrosslinkerMonoHydrolized => MonoHydro_P08659_A_297; klys_P08659_A_297*CrosslinkerMonoHydrolized*LYS_P08659_A_297;
  v170: LYS_P08659_A_303 + CrosslinkerMonoHydrolized => MonoHydro_P08659_A_303; klys_P08659_A_303*CrosslinkerMonoHydrolized*LYS_P08659_A_303;
  v171: LYS_P08659_A_321 + CrosslinkerMonoHydrolized => MonoHydro_P08659_A_321; klys_P08659_A_321*CrosslinkerMonoHydrolized*LYS_P08659_A_321;
  v172: LYS_P08659_A_329 + CrosslinkerMonoHydrolized => MonoHydro_P08659_A_329; klys_P08659_A_329*CrosslinkerMonoHydrolized*LYS_P08659_A_329;
  v173: LYS_P08659_A_358 + CrosslinkerMonoHydrolized => MonoHydro_P08659_A_358; klys_P08659_A_358*CrosslinkerMonoHydrolized*LYS_P08659_A_358;
  v174: LYS_P08659_A_364 + CrosslinkerMonoHydrolized => MonoHydro_P08659_A_364; klys_P08659_A_364*CrosslinkerMonoHydrolized*LYS_P08659_A_364;
  v175: LYS_P08659_A_372 + CrosslinkerMonoHydrolized => MonoHydro_P08659_A_372; klys_P08659_A_372*CrosslinkerMonoHydrolized*LYS_P08659_A_372;
  v176: LYS_P08659_A_380 + CrosslinkerMonoHydrolized => MonoHydro_P08659_A_380; klys_P08659_A_380*CrosslinkerMonoHydrolized*LYS_P08659_A_380;
  v177: LYS_P08659_A_414 + CrosslinkerMonoHydrolized => MonoHydro_P08659_A_414; klys_P08659_A_414*CrosslinkerMonoHydrolized*LYS_P08659_A_414;
  v178: LYS_P08659_A_439 + CrosslinkerMonoHydrolized => MonoHydro_P08659_A_439; klys_P08659_A_439*CrosslinkerMonoHydrolized*LYS_P08659_A_439;
  v179: LYS_P08659_A_443 + CrosslinkerMonoHydrolized => MonoHydro_P08659_A_443; klys_P08659_A_443*CrosslinkerMonoHydrolized*LYS_P08659_A_443;
  v180: LYS_P08659_A_445 + CrosslinkerMonoHydrolized => MonoHydro_P08659_A_445; klys_P08659_A_445*CrosslinkerMonoHydrolized*LYS_P08659_A_445;
  v181: LYS_P08659_A_496 + CrosslinkerMonoHydrolized => MonoHydro_P08659_A_496; klys_P08659_A_496*CrosslinkerMonoHydrolized*LYS_P08659_A_496;
  v182: LYS_P08659_A_510 + CrosslinkerMonoHydrolized => MonoHydro_P08659_A_510; klys_P08659_A_510*CrosslinkerMonoHydrolized*LYS_P08659_A_510;
  v183: LYS_P08659_A_511 + CrosslinkerMonoHydrolized => MonoHydro_P08659_A_511; klys_P08659_A_511*CrosslinkerMonoHydrolized*LYS_P08659_A_511;
  v184: LYS_P08659_A_524 + CrosslinkerMonoHydrolized => MonoHydro_P08659_A_524; klys_P08659_A_524*CrosslinkerMonoHydrolized*LYS_P08659_A_524;
  v185: LYS_P08659_A_529 + CrosslinkerMonoHydrolized => MonoHydro_P08659_A_529; klys_P08659_A_529*CrosslinkerMonoHydrolized*LYS_P08659_A_529;
  v186: LYS_P08659_A_534 + CrosslinkerMonoHydrolized => MonoHydro_P08659_A_534; klys_P08659_A_534*CrosslinkerMonoHydrolized*LYS_P08659_A_534;
  v187: LYS_P08659_A_541 + CrosslinkerMonoHydrolized => MonoHydro_P08659_A_541; klys_P08659_A_541*CrosslinkerMonoHydrolized*LYS_P08659_A_541;
  v188: LYS_P08659_B_5 + CrosslinkerMonoHydrolized => MonoHydro_P08659_B_5; klys_P08659_B_5*CrosslinkerMonoHydrolized*LYS_P08659_B_5;
  v189: LYS_P08659_B_8 + CrosslinkerMonoHydrolized => MonoHydro_P08659_B_8; klys_P08659_B_8*CrosslinkerMonoHydrolized*LYS_P08659_B_8;
  v190: LYS_P08659_B_9 + CrosslinkerMonoHydrolized => MonoHydro_P08659_B_9; klys_P08659_B_9*CrosslinkerMonoHydrolized*LYS_P08659_B_9;
  v191: LYS_P08659_B_28 + CrosslinkerMonoHydrolized => MonoHydro_P08659_B_28; klys_P08659_B_28*CrosslinkerMonoHydrolized*LYS_P08659_B_28;
  v192: LYS_P08659_B_31 + CrosslinkerMonoHydrolized => MonoHydro_P08659_B_31; klys_P08659_B_31*CrosslinkerMonoHydrolized*LYS_P08659_B_31;
  v193: LYS_P08659_B_68 + CrosslinkerMonoHydrolized => MonoHydro_P08659_B_68; klys_P08659_B_68*CrosslinkerMonoHydrolized*LYS_P08659_B_68;
  v194: LYS_P08659_B_130 + CrosslinkerMonoHydrolized => MonoHydro_P08659_B_130; klys_P08659_B_130*CrosslinkerMonoHydrolized*LYS_P08659_B_130;
  v195: LYS_P08659_B_131 + CrosslinkerMonoHydrolized => MonoHydro_P08659_B_131; klys_P08659_B_131*CrosslinkerMonoHydrolized*LYS_P08659_B_131;
  v196: LYS_P08659_B_135 + CrosslinkerMonoHydrolized => MonoHydro_P08659_B_135; klys_P08659_B_135*CrosslinkerMonoHydrolized*LYS_P08659_B_135;
  v197: LYS_P08659_B_141 + CrosslinkerMonoHydrolized => MonoHydro_P08659_B_141; klys_P08659_B_141*CrosslinkerMonoHydrolized*LYS_P08659_B_141;
  v198: LYS_P08659_B_142 + CrosslinkerMonoHydrolized => MonoHydro_P08659_B_142; klys_P08659_B_142*CrosslinkerMonoHydrolized*LYS_P08659_B_142;
  v199: LYS_P08659_B_148 + CrosslinkerMonoHydrolized => MonoHydro_P08659_B_148; klys_P08659_B_148*CrosslinkerMonoHydrolized*LYS_P08659_B_148;
  v200: LYS_P08659_B_155 + CrosslinkerMonoHydrolized => MonoHydro_P08659_B_155; klys_P08659_B_155*CrosslinkerMonoHydrolized*LYS_P08659_B_155;
  v201: LYS_P08659_B_190 + CrosslinkerMonoHydrolized => MonoHydro_P08659_B_190; klys_P08659_B_190*CrosslinkerMonoHydrolized*LYS_P08659_B_190;
  v202: LYS_P08659_B_206 + CrosslinkerMonoHydrolized => MonoHydro_P08659_B_206; klys_P08659_B_206*CrosslinkerMonoHydrolized*LYS_P08659_B_206;
  v203: LYS_P08659_B_281 + CrosslinkerMonoHydrolized => MonoHydro_P08659_B_281; klys_P08659_B_281*CrosslinkerMonoHydrolized*LYS_P08659_B_281;
  v204: LYS_P08659_B_297 + CrosslinkerMonoHydrolized => MonoHydro_P08659_B_297; klys_P08659_B_297*CrosslinkerMonoHydrolized*LYS_P08659_B_297;
  v205: LYS_P08659_B_303 + CrosslinkerMonoHydrolized => MonoHydro_P08659_B_303; klys_P08659_B_303*CrosslinkerMonoHydrolized*LYS_P08659_B_303;
  v206: LYS_P08659_B_321 + CrosslinkerMonoHydrolized => MonoHydro_P08659_B_321; klys_P08659_B_321*CrosslinkerMonoHydrolized*LYS_P08659_B_321;
  v207: LYS_P08659_B_329 + CrosslinkerMonoHydrolized => MonoHydro_P08659_B_329; klys_P08659_B_329*CrosslinkerMonoHydrolized*LYS_P08659_B_329;
  v208: LYS_P08659_B_358 + CrosslinkerMonoHydrolized => MonoHydro_P08659_B_358; klys_P08659_B_358*CrosslinkerMonoHydrolized*LYS_P08659_B_358;
  v209: LYS_P08659_B_364 + CrosslinkerMonoHydrolized => MonoHydro_P08659_B_364; klys_P08659_B_364*CrosslinkerMonoHydrolized*LYS_P08659_B_364;
  v210: LYS_P08659_B_372 + CrosslinkerMonoHydrolized => MonoHydro_P08659_B_372; klys_P08659_B_372*CrosslinkerMonoHydrolized*LYS_P08659_B_372;
  v211: LYS_P08659_B_380 + CrosslinkerMonoHydrolized => MonoHydro_P08659_B_380; klys_P08659_B_380*CrosslinkerMonoHydrolized*LYS_P08659_B_380;
  v212: LYS_P08659_B_414 + CrosslinkerMonoHydrolized => MonoHydro_P08659_B_414; klys_P08659_B_414*CrosslinkerMonoHydrolized*LYS_P08659_B_414;
  v213: LYS_P08659_B_439 + CrosslinkerMonoHydrolized => MonoHydro_P08659_B_439; klys_P08659_B_439*CrosslinkerMonoHydrolized*LYS_P08659_B_439;
  v214: LYS_P08659_B_443 + CrosslinkerMonoHydrolized => MonoHydro_P08659_B_443; klys_P08659_B_443*CrosslinkerMonoHydrolized*LYS_P08659_B_443;
  v215: LYS_P08659_B_445 + CrosslinkerMonoHydrolized => MonoHydro_P08659_B_445; klys_P08659_B_445*CrosslinkerMonoHydrolized*LYS_P08659_B_445;
  v216: LYS_P08659_B_491 + CrosslinkerMonoHydrolized => MonoHydro_P08659_B_491; klys_P08659_B_491*CrosslinkerMonoHydrolized*LYS_P08659_B_491;
  v217: LYS_P08659_B_496 + CrosslinkerMonoHydrolized => MonoHydro_P08659_B_496; klys_P08659_B_496*CrosslinkerMonoHydrolized*LYS_P08659_B_496;
  v218: LYS_P08659_B_510 + CrosslinkerMonoHydrolized => MonoHydro_P08659_B_510; klys_P08659_B_510*CrosslinkerMonoHydrolized*LYS_P08659_B_510;
  v219: LYS_P08659_B_511 + CrosslinkerMonoHydrolized => MonoHydro_P08659_B_511; klys_P08659_B_511*CrosslinkerMonoHydrolized*LYS_P08659_B_511;
  v220: LYS_P08659_B_524 + CrosslinkerMonoHydrolized => MonoHydro_P08659_B_524; klys_P08659_B_524*CrosslinkerMonoHydrolized*LYS_P08659_B_524;
  v221: LYS_P08659_B_529 + CrosslinkerMonoHydrolized => MonoHydro_P08659_B_529; klys_P08659_B_529*CrosslinkerMonoHydrolized*LYS_P08659_B_529;
  v222: LYS_P08659_B_534 + CrosslinkerMonoHydrolized => MonoHydro_P08659_B_534; klys_P08659_B_534*CrosslinkerMonoHydrolized*LYS_P08659_B_534;
  v223: LYS_P08659_B_541 + CrosslinkerMonoHydrolized => MonoHydro_P08659_B_541; klys_P08659_B_541*CrosslinkerMonoHydrolized*LYS_P08659_B_541;
  v224: LYS_P08659_B_543 + CrosslinkerMonoHydrolized => MonoHydro_P08659_B_543; klys_P08659_B_543*CrosslinkerMonoHydrolized*LYS_P08659_B_543;
  v225: LYS_P08659_B_544 + CrosslinkerMonoHydrolized => MonoHydro_P08659_B_544; klys_P08659_B_544*CrosslinkerMonoHydrolized*LYS_P08659_B_544;
  v226: LYS_P08659_B_547 + CrosslinkerMonoHydrolized => MonoHydro_P08659_B_547; klys_P08659_B_547*CrosslinkerMonoHydrolized*LYS_P08659_B_547;
  v227: LYS_P08659_B_549 + CrosslinkerMonoHydrolized => MonoHydro_P08659_B_549; klys_P08659_B_549*CrosslinkerMonoHydrolized*LYS_P08659_B_549;

  // Unit definitions:
  unit per_second = 1 / second;
  unit litre_per_mole_per_second = litre / (mole * second);
end
